// COMSOL Multiphysics 6.0.0.318 model "SAW_def.mph"
// Outline of the model tree

Parameters
  a = 100  // propagating direction
  b = 20 / 2  // shear direction
  c = 300  // cut direction
  omega_t = freq_t*1E6*2*pi[rad/s]
  q = (degree-0) / 180 * pi [rad]  // rotational angle
  degree = 0
  freq_t = 20.38

Variables
  var8 "maximum"
    mE = max(comp1.maxop1(sqrt(realdot(E1x,E1x)+realdot(E1y,E1y)+realdot(E1z,E1z))),comp1.maxop2(sqrt(realdot(E2x,E2x)+realdot(E2y,E2y)+realdot(E2z,E2z))))
    mEx = max(comp1.maxop1(real(E1x)),comp1.maxop2(real(E2x)))
    mEy = max(comp1.maxop1(real(E1y)),comp1.maxop2(real(E2y)))
    mEz = max(comp1.maxop1(real(E1z)),comp1.maxop2(real(E2z)))
    mDx = max(comp1.maxop1(real(D1x)),comp1.maxop2(real(D2x)))
    mDy = max(comp1.maxop1(real(D1y)),comp1.maxop2(real(D2y)))
    mDz = max(comp1.maxop1(real(D1z)),comp1.maxop2(real(D2z)))
    mHx = max(comp1.maxop1(real(H1x)),comp1.maxop2(real(H2x)))
    mHy = max(comp1.maxop1(real(H1y)),comp1.maxop2(real(H2y)))
    mHz = max(comp1.maxop1(real(H1z)),comp1.maxop2(real(H2z)))
    mH = max(comp1.maxop1(sqrt(realdot(H1x,H1x)+realdot(H1y,H1y)+realdot(H1z,H1z))),comp1.maxop2(sqrt(realdot(H2x,H2x)+realdot(H2y,H2y)+realdot(H2z,H2z))))
  var12 "Constants"
    c11 = root.material.StressCharge.cE11
    c12 = root.material.StressCharge.cE12
    c13 = root.material.StressCharge.cE13
    c14 = root.material.StressCharge.cE14
    c15 = root.material.StressCharge.cE15
    c16 = root.material.StressCharge.cE16
    c21 = root.material.StressCharge.cE21
    c22 = root.material.StressCharge.cE22
    c23 = root.material.StressCharge.cE23
    c24 = root.material.StressCharge.cE24
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    e11 = root.material.StressCharge.eES11
    e12 = root.material.StressCharge.eES12
    e13 = root.material.StressCharge.eES13
    e14 = root.material.StressCharge.eES14
    e15 = root.material.StressCharge.eES15
    e16 = root.material.StressCharge.eES16
    e21 = root.material.StressCharge.eES21
    e22 = root.material.StressCharge.eES22
    e23 = root.material.StressCharge.eES23
    e24 = root.material.StressCharge.eES24
    e25 = root.material.StressCharge.eES25
    e26 = root.material.StressCharge.eES26
    e31 = root.material.StressCharge.eES31
    e32 = root.material.StressCharge.eES32
    e33 = root.material.StressCharge.eES33
    e34 = root.material.StressCharge.eES34
    e35 = root.material.StressCharge.eES35
    e36 = root.material.StressCharge.eES36
    epsilon11 = root.material.def.epsilonr11*epsilon0_const
    epsilon12 = root.material.def.epsilonr12*epsilon0_const
    epsilon13 = root.material.def.epsilonr13*epsilon0_const
    epsilon21 = root.material.def.epsilonr21*epsilon0_const
    epsilon22 = root.material.def.epsilonr22*epsilon0_const
    epsilon23 = root.material.def.epsilonr23*epsilon0_const
    epsilon31 = root.material.def.epsilonr31*epsilon0_const
    epsilon32 = root.material.def.epsilonr32*epsilon0_const
    epsilon33 = root.material.def.epsilonr33*epsilon0_const
  var3 "u"
    S1 = comp1.ux
    S2 = comp1.vy
    S3 = comp1.wz
    S4 = comp1.vz+comp1.wy
    S5 = comp1.uz+comp1.wx
    S6 = comp1.uy+comp1.vx
    T1 = cE11*S1+cE12*S2+cE13*S3+cE14*S4+cE15*S5+cE16*S6
    T2 = cE21*S1+cE22*S2+cE23*S3+cE24*S4+cE25*S5+cE26*S6
    T3 = cE31*S1+cE32*S2+cE33*S3+cE34*S4+cE35*S5+cE36*S6
    T4 = cE41*S1+cE42*S2+cE43*S3+cE44*S4+cE45*S5+cE46*S6
    T5 = cE51*S1+cE52*S2+cE53*S3+cE54*S4+cE55*S5+cE56*S6
    T6 = cE61*S1+cE62*S2+cE63*S3+cE64*S4+cE65*S5+cE66*S6
    rho = root.material.rho
    mu = 1
    omega = 2*pi*lambda [rad/s]  // Angular frequency
    eSx = eES11*S1+eES12*S2+eES13*S3+eES14*S4+eES15*S5+eES16*S6
    eSy = eES21*S1+eES22*S2+eES23*S3+eES24*S4+eES25*S5+eES26*S6
    eSz = eES31*S1+eES32*S2+eES33*S3+eES34*S4+eES35*S5+eES36*S6
  var4 "EM1"
    H1x = curlM1x / (-i*mu0_const)  // !
    H1y = curlM1y / (-i*mu0_const)  // !
    H1z = curlM1z / (-i*mu0_const)  // !
    curlE1x = d(E1z,y)- d(E1y,z)
    curlE1y = d(E1x,z) - d(E1z,x)
    curlE1z = d(E1y,x) - d(E1x,y)
    tE1x = E1x-(comp1.w2.nx*E1x+comp1.w2.ny*E1y+comp1.w2.nz*E1z)*comp1.w2.nx
    tE1y = E1y-(comp1.w2.nx*E1x+comp1.w2.ny*E1y+comp1.w2.nz*E1z)*comp1.w2.ny
    tE1z = E1z-(comp1.w2.nx*E1x+comp1.w2.ny*E1y+comp1.w2.nz*E1z)*comp1.w2.nz
    tcurlE1x = curlE1x-(comp1.w2.nx*curlE1x+comp1.w2.ny*curlE1y+comp1.w2.nz*curlE1z)*comp1.w2.nx
    tcurlE1y = curlE1y-(comp1.w2.nx*curlE1x+comp1.w2.ny*curlE1y+comp1.w2.nz*curlE1z)*comp1.w2.ny
    tcurlE1z = curlE1z-(comp1.w2.nx*curlE1x+comp1.w2.ny*curlE1y+comp1.w2.nz*curlE1z)*comp1.w2.nz
    eE1 = eES11*E1x + eES21*E1y + eES31*E1z  // 耦合系数*电场
    eE2 = eES12*E1x + eES22*E1y + eES32*E1z
    eE3 = eES13*E1x + eES23*E1y + eES33*E1z
    eE4 = eES14*E1x + eES24*E1y + eES34*E1z
    eE5 = eES15*E1x + eES25*E1y + eES35*E1z
    eE6 = eES16*E1x + eES26*E1y + eES36*E1z
    diveEx = d(eE1,x)+d(eE5,z)+d(eE6,y)
    diveEy = d(eE2,y)+d(eE4,z)+d(eE6,x)
    diveEz = d(eE3,z)+d(eE4,y)+d(eE5,x)
    B1z = H1z*mu0_const
    B1x = H1x*mu0_const
    B1y = H1y*mu0_const
    D1x = epsilon_xx*E1x + epsilon_xy*E1y + epsilon_xz*E1z + eSx
    D1y = epsilon_yx*E1x + epsilon_yy*E1y + epsilon_yz*E1z + eSy
    D1z = epsilon_zx*E1x + epsilon_zy*E1y + epsilon_zz*E1z + eSz
    D1xE = epsilon_xx*E1x + epsilon_xy*E1y + epsilon_xz*E1z  // D场的非耦合部分
    D1yE = epsilon_yx*E1x + epsilon_yy*E1y + epsilon_yz*E1z
    D1zE = epsilon_zx*E1x + epsilon_zy*E1y + epsilon_zz*E1z
    curlM1x = comp1.M1zy - comp1.M1yz
    curlM1y = comp1.M1xz - comp1.M1zx
    curlM1z = comp1.M1yx - comp1.M1xy
    E1x = comp1.M1x * omega
    E1y = comp1.M1y * omega
    E1z = comp1.M1z * omega
    tM1x = comp1.M1x-(comp1.w2.nx*comp1.M1x+comp1.w2.ny*comp1.M1y+comp1.w2.nz*comp1.M1z)*comp1.w2.nx
    tM1y = comp1.M1y-(comp1.w2.nx*comp1.M1x+comp1.w2.ny*comp1.M1y+comp1.w2.nz*comp1.M1z)*comp1.w2.ny
    tM1z = comp1.M1z-(comp1.w2.nx*comp1.M1x+comp1.w2.ny*comp1.M1y+comp1.w2.nz*comp1.M1z)*comp1.w2.nz
  var6 "EM2"
    H2x = curlM2x / (-i*mu0_const)  // !
    H2y = curlM2y / (-i*mu0_const)  // !
    H2z = curlM2z / (-i*mu0_const)  // !
    curlE2x = d(E2z,y) - d(E2y,z)
    curlE2y = d(E2x,z) - d(E2z,x)
    curlE2z = d(E2y,x) - d(E2x,y)
    tE2x = E2x-(comp1.w3.nx*E2x+comp1.w3.ny*E2y+comp1.w3.nz*E2z)*comp1.w3.nx
    tE2y = E2y-(comp1.w3.nx*E2x+comp1.w3.ny*E2y+comp1.w3.nz*E2z)*comp1.w3.ny
    tE2z = E2z-(comp1.w3.nx*E2x+comp1.w3.ny*E2y+comp1.w3.nz*E2z)*comp1.w3.nz
    B2z = H2z*mu0_const
    B2x = H2x*mu0_const
    B2y = H2y*mu0_const
    D2x = epsilon_xx*E2x + epsilon_xy*E2y + epsilon_xz*E2z
    D2y = epsilon_yx*E2x + epsilon_yy*E2y + epsilon_yz*E2z
    D2z = epsilon_zx*E2x + epsilon_zy*E2y + epsilon_zz*E2z
    E2x = comp1.M2x * omega
    E2y = comp1.M2y * omega
    E2z = comp1.M2z * omega
    curlM2x = comp1.M2zy - comp1.M2yz
    curlM2y = comp1.M2xz - comp1.M2zx
    curlM2z = comp1.M2yx - comp1.M2xy
    tM2x = comp1.M2x-(comp1.w3.nx*comp1.M2x+comp1.w3.ny*comp1.M2y+comp1.w3.nz*comp1.M2z)*comp1.w3.nx
    tM2y = comp1.M2y-(comp1.w3.nx*comp1.M2x+comp1.w3.ny*comp1.M2y+comp1.w3.nz*comp1.M2z)*comp1.w3.ny
    tM2z = comp1.M2z-(comp1.w3.nx*comp1.M2x+comp1.w3.ny*comp1.M2y+comp1.w3.nz*comp1.M2z)*comp1.w3.nz
  var1 "mat_XZ" (disabled)
    epsilon2_xx = root.material.def.epsilonr11*epsilon0_const
    epsilon2_yy = root.material.def.epsilonr33*epsilon0_const
    epsilon2_zz = root.material.def.epsilonr22*epsilon0_const
    cE11 = root.material.StressCharge.cE11
    cE12 = root.material.StressCharge.cE13
    cE13 = root.material.StressCharge.cE12
    cE14 = root.material.StressCharge.cE14
    cE15 = root.material.StressCharge.cE16
    cE16 = root.material.StressCharge.cE15
    cE21 = root.material.StressCharge.cE31
    cE22 = root.material.StressCharge.cE33
    cE23 = root.material.StressCharge.cE32
    cE24 = root.material.StressCharge.cE34
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    eES11 = root.material.StressCharge.eES11
    eES12 = root.material.StressCharge.eES13
    eES13 = root.material.StressCharge.eES12
    eES14 = root.material.StressCharge.eES14
    eES15 = root.material.StressCharge.eES16
    eES16 = root.material.StressCharge.eES15
    eES21 = root.material.StressCharge.eES31
    eES22 = root.material.StressCharge.eES33
    eES23 = root.material.StressCharge.eES32
    eES24 = root.material.StressCharge.eES34
    eES25 = root.material.StressCharge.eES36
    eES26 = root.material.StressCharge.eES35
    eES31 = root.material.StressCharge.eES21
    eES32 = root.material.StressCharge.eES23
    eES33 = root.material.StressCharge.eES22
    eES34 = root.material.StressCharge.eES24
    eES35 = root.material.StressCharge.eES26
    eES36 = root.material.StressCharge.eES25
    epsilon1_xx = root.material.def.epsilonr11*epsilon0_const
    epsilon1_yy = root.material.def.epsilonr33*epsilon0_const
    epsilon1_zz = root.material.def.epsilonr22*epsilon0_const
  var2 "mat_XY" (disabled)
    epsilon2_xx = root.material.def.epsilonr11*epsilon0_const
    epsilon2_yy = root.material.def.epsilonr22*epsilon0_const
    epsilon2_zz = root.material.def.epsilonr33*epsilon0_const
    cE11 = root.material.StressCharge.cE11
    cE12 = root.material.StressCharge.cE12
    cE13 = root.material.StressCharge.cE13
    cE14 = root.material.StressCharge.cE14
    cE15 = root.material.StressCharge.cE15
    cE16 = root.material.StressCharge.cE16
    cE21 = root.material.StressCharge.cE21
    cE22 = root.material.StressCharge.cE22
    cE23 = root.material.StressCharge.cE23
    cE24 = root.material.StressCharge.cE24
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    eES11 = root.material.StressCharge.eES11
    eES12 = root.material.StressCharge.eES12
    eES13 = root.material.StressCharge.eES13
    eES14 = root.material.StressCharge.eES14
    eES15 = root.material.StressCharge.eES15
    eES16 = root.material.StressCharge.eES16
    eES21 = root.material.StressCharge.eES21
    eES22 = root.material.StressCharge.eES22
    eES23 = root.material.StressCharge.eES23
    eES24 = root.material.StressCharge.eES24
    eES25 = root.material.StressCharge.eES25
    eES26 = root.material.StressCharge.eES26
    eES31 = root.material.StressCharge.eES31
    eES32 = root.material.StressCharge.eES32
    eES33 = root.material.StressCharge.eES33
    eES34 = root.material.StressCharge.eES34
    eES35 = root.material.StressCharge.eES35
    eES36 = root.material.StressCharge.eES36
    epsilon1_xx = root.material.def.epsilonr11*epsilon0_const
    epsilon1_yy = root.material.def.epsilonr22*epsilon0_const
    epsilon1_zz = root.material.def.epsilonr33*epsilon0_const
  var5 "Variables 5"
  var7 "X-prop Z-cut" (disabled)
    epsilon_xx = root.material.def.epsilonr11*epsilon0_const
    epsilon_yy = root.material.def.epsilonr22*epsilon0_const
    epsilon_zz = root.material.def.epsilonr33*epsilon0_const
    cE11 = root.material.StressCharge.cE11
    cE12 = root.material.StressCharge.cE12
    cE13 = root.material.StressCharge.cE13
    cE14 = root.material.StressCharge.cE14
    cE15 = root.material.StressCharge.cE15
    cE16 = root.material.StressCharge.cE16
    cE21 = root.material.StressCharge.cE21
    cE22 = root.material.StressCharge.cE22
    cE23 = root.material.StressCharge.cE23
    cE24 = root.material.StressCharge.cE24
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    eES11 = root.material.StressCharge.eES11
    eES12 = root.material.StressCharge.eES12
    eES13 = root.material.StressCharge.eES13
    eES14 = root.material.StressCharge.eES14
    eES15 = root.material.StressCharge.eES15
    eES16 = root.material.StressCharge.eES16
    eES21 = root.material.StressCharge.eES21
    eES22 = root.material.StressCharge.eES22
    eES23 = root.material.StressCharge.eES23
    eES24 = root.material.StressCharge.eES24
    eES25 = root.material.StressCharge.eES25
    eES26 = root.material.StressCharge.eES26
    eES31 = root.material.StressCharge.eES31
    eES32 = root.material.StressCharge.eES32
    eES33 = root.material.StressCharge.eES33
    eES34 = root.material.StressCharge.eES34
    eES35 = root.material.StressCharge.eES35
    eES36 = root.material.StressCharge.eES36
  var9 "rotate along spatial-x" (disabled)
    cE11 = c11
    cE12 = c13*sin(q)^2 + c12*cos(q)^2 + 2*c14*cos(q)*sin(q)
    cE13 = c12*sin(q)^2 + c13*cos(q)^2 - 2*c14*cos(q)*sin(q)
    cE14 = c14*(cos(q)^2 - sin(q)^2) - c12*cos(q)*sin(q) + c13*cos(q)*sin(q)
    cE15 = c15*cos(q) - c16*sin(q)
    cE16 = c16*cos(q) + c15*sin(q)
    cE21 = c31*sin(q)^2 + c21*cos(q)^2 + 2*c41*cos(q)*sin(q)
    cE22 = cos(q)^2*(c32*sin(q)^2 + c22*cos(q)^2 + 2*c42*cos(q)*sin(q)) + sin(q)^2*(c33*sin(q)^2 + c23*cos(q)^2 + 2*c43*cos(q)*sin(q)) + 2*cos(q)*sin(q)*(c34*sin(q)^2 + c24*cos(q)^2 + 2*c44*cos(q)*sin(q))
    cE23 = cos(q)^2*(c33*sin(q)^2 + c23*cos(q)^2 + 2*c43*cos(q)*sin(q)) + sin(q)^2*(c32*sin(q)^2 + c22*cos(q)^2 + 2*c42*cos(q)*sin(q)) - 2*cos(q)*sin(q)*(c34*sin(q)^2 + c24*cos(q)^2 + 2*c44*cos(q)*sin(q))
    cE24 = (cos(q)^2 - sin(q)^2)*(c34*sin(q)^2 + c24*cos(q)^2 + 2*c44*cos(q)*sin(q)) - cos(q)*sin(q)*(c32*sin(q)^2 + c22*cos(q)^2 + 2*c42*cos(q)*sin(q)) + cos(q)*sin(q)*(c33*sin(q)^2 + c23*cos(q)^2 + 2*c43*cos(q)*sin(q))
    cE25 = cos(q)*(c35*sin(q)^2 + c25*cos(q)^2 + 2*c45*cos(q)*sin(q)) - sin(q)*(c36*sin(q)^2 + c26*cos(q)^2 + 2*c46*cos(q)*sin(q))
    cE26 = cos(q)*(c36*sin(q)^2 + c26*cos(q)^2 + 2*c46*cos(q)*sin(q)) + sin(q)*(c35*sin(q)^2 + c25*cos(q)^2 + 2*c45*cos(q)*sin(q))
    cE31 = c21*sin(q)^2 + c31*cos(q)^2 - 2*c41*cos(q)*sin(q)
    cE32 = cos(q)^2*(c22*sin(q)^2 + c32*cos(q)^2 - 2*c42*cos(q)*sin(q)) + sin(q)^2*(c23*sin(q)^2 + c33*cos(q)^2 - 2*c43*cos(q)*sin(q)) + 2*cos(q)*sin(q)*(c24*sin(q)^2 + c34*cos(q)^2 - 2*c44*cos(q)*sin(q))
    cE33 = cos(q)^2*(c23*sin(q)^2 + c33*cos(q)^2 - 2*c43*cos(q)*sin(q)) + sin(q)^2*(c22*sin(q)^2 + c32*cos(q)^2 - 2*c42*cos(q)*sin(q)) - 2*cos(q)*sin(q)*(c24*sin(q)^2 + c34*cos(q)^2 - 2*c44*cos(q)*sin(q))
    cE34 = (cos(q)^2 - sin(q)^2)*(c24*sin(q)^2 + c34*cos(q)^2 - 2*c44*cos(q)*sin(q)) - cos(q)*sin(q)*(c22*sin(q)^2 + c32*cos(q)^2 - 2*c42*cos(q)*sin(q)) + cos(q)*sin(q)*(c23*sin(q)^2 + c33*cos(q)^2 - 2*c43*cos(q)*sin(q))
    cE35 = cos(q)*(c25*sin(q)^2 + c35*cos(q)^2 - 2*c45*cos(q)*sin(q)) - sin(q)*(c26*sin(q)^2 + c36*cos(q)^2 - 2*c46*cos(q)*sin(q))
    cE36 = cos(q)*(c26*sin(q)^2 + c36*cos(q)^2 - 2*c46*cos(q)*sin(q)) + sin(q)*(c25*sin(q)^2 + c35*cos(q)^2 - 2*c45*cos(q)*sin(q))
    cE41 = c41*(cos(q)^2 - sin(q)^2) - c21*cos(q)*sin(q) + c31*cos(q)*sin(q)
    cE42 = cos(q)^2*(c42*(cos(q)^2 - sin(q)^2) - c22*cos(q)*sin(q) + c32*cos(q)*sin(q)) + sin(q)^2*(c43*(cos(q)^2 - sin(q)^2) - c23*cos(q)*sin(q) + c33*cos(q)*sin(q)) + 2*cos(q)*sin(q)*(c44*(cos(q)^2 - sin(q)^2) - c24*cos(q)*sin(q) + c34*cos(q)*sin(q))
    cE43 = cos(q)^2*(c43*(cos(q)^2 - sin(q)^2) - c23*cos(q)*sin(q) + c33*cos(q)*sin(q)) + sin(q)^2*(c42*(cos(q)^2 - sin(q)^2) - c22*cos(q)*sin(q) + c32*cos(q)*sin(q)) - 2*cos(q)*sin(q)*(c44*(cos(q)^2 - sin(q)^2) - c24*cos(q)*sin(q) + c34*cos(q)*sin(q))
    cE44 = (cos(q)^2 - sin(q)^2)*(c44*(cos(q)^2 - sin(q)^2) - c24*cos(q)*sin(q) + c34*cos(q)*sin(q)) - cos(q)*sin(q)*(c42*(cos(q)^2 - sin(q)^2) - c22*cos(q)*sin(q) + c32*cos(q)*sin(q)) + cos(q)*sin(q)*(c43*(cos(q)^2 - sin(q)^2) - c23*cos(q)*sin(q) + c33*cos(q)*sin(q))
    cE45 = cos(q)*(c45*(cos(q)^2 - sin(q)^2) - c25*cos(q)*sin(q) + c35*cos(q)*sin(q)) - sin(q)*(c46*(cos(q)^2 - sin(q)^2) - c26*cos(q)*sin(q) + c36*cos(q)*sin(q))
    cE46 = cos(q)*(c46*(cos(q)^2 - sin(q)^2) - c26*cos(q)*sin(q) + c36*cos(q)*sin(q)) + sin(q)*(c45*(cos(q)^2 - sin(q)^2) - c25*cos(q)*sin(q) + c35*cos(q)*sin(q))
    cE51 = c51*cos(q) - c61*sin(q)
    cE52 = cos(q)^2*(c52*cos(q) - c62*sin(q)) + sin(q)^2*(c53*cos(q) - c63*sin(q)) + 2*cos(q)*sin(q)*(c54*cos(q) - c64*sin(q))
    cE53 = cos(q)^2*(c53*cos(q) - c63*sin(q)) + sin(q)^2*(c52*cos(q) - c62*sin(q)) - 2*cos(q)*sin(q)*(c54*cos(q) - c64*sin(q))
    cE54 = (cos(q)^2 - sin(q)^2)*(c54*cos(q) - c64*sin(q)) - cos(q)*sin(q)*(c52*cos(q) - c62*sin(q)) + cos(q)*sin(q)*(c53*cos(q) - c63*sin(q))
    cE55 = cos(q)*(c55*cos(q) - c65*sin(q)) - sin(q)*(c56*cos(q) - c66*sin(q))
    cE56 = cos(q)*(c56*cos(q) - c66*sin(q)) + sin(q)*(c55*cos(q) - c65*sin(q))
    cE61 = c61*cos(q) + c51*sin(q)
    cE62 = cos(q)^2*(c62*cos(q) + c52*sin(q)) + sin(q)^2*(c63*cos(q) + c53*sin(q)) + 2*cos(q)*sin(q)*(c64*cos(q) + c54*sin(q))
    cE63 = cos(q)^2*(c63*cos(q) + c53*sin(q)) + sin(q)^2*(c62*cos(q) + c52*sin(q)) - 2*cos(q)*sin(q)*(c64*cos(q) + c54*sin(q))
    cE64 = (cos(q)^2 - sin(q)^2)*(c64*cos(q) + c54*sin(q)) - cos(q)*sin(q)*(c62*cos(q) + c52*sin(q)) + cos(q)*sin(q)*(c63*cos(q) + c53*sin(q))
    cE65 = cos(q)*(c65*cos(q) + c55*sin(q)) - sin(q)*(c66*cos(q) + c56*sin(q))
    cE66 = cos(q)*(c66*cos(q) + c56*sin(q)) + sin(q)*(c65*cos(q) + c55*sin(q))
    eES11 = e11
    eES12 = e13*sin(q)^2 + e12*cos(q)^2 + 2*e14*cos(q)*sin(q)
    eES13 = e12*sin(q)^2 + e13*cos(q)^2 - 2*e14*cos(q)*sin(q)
    eES14 = e14*(cos(q)^2 - sin(q)^2) - e12*cos(q)*sin(q) + e13*cos(q)*sin(q)
    eES15 = e15*cos(q) - e16*sin(q)
    eES16 = e16*cos(q) + e15*sin(q)
    eES21 = e21*cos(q) + e31*sin(q)
    eES22 = cos(q)^2*(e22*cos(q) + e32*sin(q)) + sin(q)^2*(e23*cos(q) + e33*sin(q)) + 2*cos(q)*sin(q)*(e24*cos(q) + e34*sin(q))
    eES23 = cos(q)^2*(e23*cos(q) + e33*sin(q)) + sin(q)^2*(e22*cos(q) + e32*sin(q)) - 2*cos(q)*sin(q)*(e24*cos(q) + e34*sin(q))
    eES24 = (cos(q)^2 - sin(q)^2)*(e24*cos(q) + e34*sin(q)) - cos(q)*sin(q)*(e22*cos(q) + e32*sin(q)) + cos(q)*sin(q)*(e23*cos(q) + e33*sin(q))
    eES25 = cos(q)*(e25*cos(q) + e35*sin(q)) - sin(q)*(e26*cos(q) + e36*sin(q))
    eES26 = cos(q)*(e26*cos(q) + e36*sin(q)) + sin(q)*(e25*cos(q) + e35*sin(q))
    eES31 = e31*cos(q) - e21*sin(q)
    eES32 = cos(q)^2*(e32*cos(q) - e22*sin(q)) + sin(q)^2*(e33*cos(q) - e23*sin(q)) + 2*cos(q)*sin(q)*(e34*cos(q) - e24*sin(q))
    eES33 = cos(q)^2*(e33*cos(q) - e23*sin(q)) + sin(q)^2*(e32*cos(q) - e22*sin(q)) - 2*cos(q)*sin(q)*(e34*cos(q) - e24*sin(q))
    eES34 = (cos(q)^2 - sin(q)^2)*(e34*cos(q) - e24*sin(q)) - cos(q)*sin(q)*(e32*cos(q) - e22*sin(q)) + cos(q)*sin(q)*(e33*cos(q) - e23*sin(q))
    eES35 = cos(q)*(e35*cos(q) - e25*sin(q)) - sin(q)*(e36*cos(q) - e26*sin(q))
    eES36 = cos(q)*(e36*cos(q) - e26*sin(q)) + sin(q)*(e35*cos(q) - e25*sin(q))
    epsilon_xx = epsilon11
    epsilon_xy = epsilon12*cos(q) + epsilon13*sin(q)
    epsilon_xz = epsilon13*cos(q) - epsilon12*sin(q)
    epsilon_yx = epsilon21*cos(q) + epsilon31*sin(q)
    epsilon_yy = cos(q)*(epsilon22*cos(q) + epsilon32*sin(q)) + sin(q)*(epsilon23*cos(q) + epsilon33*sin(q))
    epsilon_yz = cos(q)*(epsilon23*cos(q) + epsilon33*sin(q)) - sin(q)*(epsilon22*cos(q) + epsilon32*sin(q))
    epsilon_zx = epsilon31*cos(q) - epsilon21*sin(q)
    epsilon_zy = cos(q)*(epsilon32*cos(q) - epsilon22*sin(q)) + sin(q)*(epsilon33*cos(q) - epsilon23*sin(q))
    epsilon_zz = cos(q)*(epsilon33*cos(q) - epsilon23*sin(q)) - sin(q)*(epsilon32*cos(q) - epsilon22*sin(q))
  var13 "rotate along spatial-y" (disabled)
    cE11 = cos(q)^2*(c31*sin(q)^2 + c11*cos(q)^2 + 2*c51*cos(q)*sin(q)) + sin(q)^2*(c33*sin(q)^2 + c13*cos(q)^2 + 2*c53*cos(q)*sin(q)) + 2*cos(q)*sin(q)*(c35*sin(q)^2 + c15*cos(q)^2 + 2*c55*cos(q)*sin(q))
    cE12 = c32*sin(q)^2 + c12*cos(q)^2 + 2*c52*cos(q)*sin(q)
    cE13 = cos(q)^2*(c33*sin(q)^2 + c13*cos(q)^2 + 2*c53*cos(q)*sin(q)) + sin(q)^2*(c31*sin(q)^2 + c11*cos(q)^2 + 2*c51*cos(q)*sin(q)) - 2*cos(q)*sin(q)*(c35*sin(q)^2 + c15*cos(q)^2 + 2*c55*cos(q)*sin(q))
    cE14 = cos(q)*(c34*sin(q)^2 + c14*cos(q)^2 + 2*c54*cos(q)*sin(q)) - sin(q)*(c36*sin(q)^2 + c16*cos(q)^2 + 2*c56*cos(q)*sin(q))
    cE15 = (cos(q)^2 - sin(q)^2)*(c35*sin(q)^2 + c15*cos(q)^2 + 2*c55*cos(q)*sin(q)) - cos(q)*sin(q)*(c31*sin(q)^2 + c11*cos(q)^2 + 2*c51*cos(q)*sin(q)) + cos(q)*sin(q)*(c33*sin(q)^2 + c13*cos(q)^2 + 2*c53*cos(q)*sin(q))
    cE16 = cos(q)*(c36*sin(q)^2 + c16*cos(q)^2 + 2*c56*cos(q)*sin(q)) + sin(q)*(c34*sin(q)^2 + c14*cos(q)^2 + 2*c54*cos(q)*sin(q))
    cE21 = c23*sin(q)^2 + c21*cos(q)^2 + 2*c25*cos(q)*sin(q)
    cE22 = c22
    cE23 = c21*sin(q)^2 + c23*cos(q)^2 - 2*c25*cos(q)*sin(q)
    cE24 = c24*cos(q) - c26*sin(q)
    cE25 = c25*(cos(q)^2 - sin(q)^2) - c21*cos(q)*sin(q) + c23*cos(q)*sin(q)
    cE26 = c26*cos(q) + c24*sin(q)
    cE31 = cos(q)^2*(c11*sin(q)^2 + c31*cos(q)^2 - 2*c51*cos(q)*sin(q)) + sin(q)^2*(c13*sin(q)^2 + c33*cos(q)^2 - 2*c53*cos(q)*sin(q)) + 2*cos(q)*sin(q)*(c15*sin(q)^2 + c35*cos(q)^2 - 2*c55*cos(q)*sin(q))
    cE32 = c12*sin(q)^2 + c32*cos(q)^2 - 2*c52*cos(q)*sin(q)
    cE33 = cos(q)^2*(c13*sin(q)^2 + c33*cos(q)^2 - 2*c53*cos(q)*sin(q)) + sin(q)^2*(c11*sin(q)^2 + c31*cos(q)^2 - 2*c51*cos(q)*sin(q)) - 2*cos(q)*sin(q)*(c15*sin(q)^2 + c35*cos(q)^2 - 2*c55*cos(q)*sin(q))
    cE34 = cos(q)*(c14*sin(q)^2 + c34*cos(q)^2 - 2*c54*cos(q)*sin(q)) - sin(q)*(c16*sin(q)^2 + c36*cos(q)^2 - 2*c56*cos(q)*sin(q))
    cE35 = (cos(q)^2 - sin(q)^2)*(c15*sin(q)^2 + c35*cos(q)^2 - 2*c55*cos(q)*sin(q)) - cos(q)*sin(q)*(c11*sin(q)^2 + c31*cos(q)^2 - 2*c51*cos(q)*sin(q)) + cos(q)*sin(q)*(c13*sin(q)^2 + c33*cos(q)^2 - 2*c53*cos(q)*sin(q))
    cE36 = cos(q)*(c16*sin(q)^2 + c36*cos(q)^2 - 2*c56*cos(q)*sin(q)) + sin(q)*(c14*sin(q)^2 + c34*cos(q)^2 - 2*c54*cos(q)*sin(q))
    cE41 = cos(q)^2*(c41*cos(q) - c61*sin(q)) + sin(q)^2*(c43*cos(q) - c63*sin(q)) + 2*cos(q)*sin(q)*(c45*cos(q) - c65*sin(q))
    cE42 = c42*cos(q) - c62*sin(q)
    cE43 = cos(q)^2*(c43*cos(q) - c63*sin(q)) + sin(q)^2*(c41*cos(q) - c61*sin(q)) - 2*cos(q)*sin(q)*(c45*cos(q) - c65*sin(q))
    cE44 = cos(q)*(c44*cos(q) - c64*sin(q)) - sin(q)*(c46*cos(q) - c66*sin(q))
    cE45 = (cos(q)^2 - sin(q)^2)*(c45*cos(q) - c65*sin(q)) - cos(q)*sin(q)*(c41*cos(q) - c61*sin(q)) + cos(q)*sin(q)*(c43*cos(q) - c63*sin(q))
    cE46 = cos(q)*(c46*cos(q) - c66*sin(q)) + sin(q)*(c44*cos(q) - c64*sin(q))
    cE51 = cos(q)^2*(c51*(cos(q)^2 - sin(q)^2) - c11*cos(q)*sin(q) + c31*cos(q)*sin(q)) + sin(q)^2*(c53*(cos(q)^2 - sin(q)^2) - c13*cos(q)*sin(q) + c33*cos(q)*sin(q)) + 2*cos(q)*sin(q)*(c55*(cos(q)^2 - sin(q)^2) - c15*cos(q)*sin(q) + c35*cos(q)*sin(q))
    cE52 = c52*(cos(q)^2 - sin(q)^2) - c12*cos(q)*sin(q) + c32*cos(q)*sin(q)
    cE53 = cos(q)^2*(c53*(cos(q)^2 - sin(q)^2) - c13*cos(q)*sin(q) + c33*cos(q)*sin(q)) + sin(q)^2*(c51*(cos(q)^2 - sin(q)^2) - c11*cos(q)*sin(q) + c31*cos(q)*sin(q)) - 2*cos(q)*sin(q)*(c55*(cos(q)^2 - sin(q)^2) - c15*cos(q)*sin(q) + c35*cos(q)*sin(q))
    cE54 = cos(q)*(c54*(cos(q)^2 - sin(q)^2) - c14*cos(q)*sin(q) + c34*cos(q)*sin(q)) - sin(q)*(c56*(cos(q)^2 - sin(q)^2) - c16*cos(q)*sin(q) + c36*cos(q)*sin(q))
    cE55 = (cos(q)^2 - sin(q)^2)*(c55*(cos(q)^2 - sin(q)^2) - c15*cos(q)*sin(q) + c35*cos(q)*sin(q)) - cos(q)*sin(q)*(c51*(cos(q)^2 - sin(q)^2) - c11*cos(q)*sin(q) + c31*cos(q)*sin(q)) + cos(q)*sin(q)*(c53*(cos(q)^2 - sin(q)^2) - c13*cos(q)*sin(q) + c33*cos(q)*sin(q))
    cE56 = cos(q)*(c56*(cos(q)^2 - sin(q)^2) - c16*cos(q)*sin(q) + c36*cos(q)*sin(q)) + sin(q)*(c54*(cos(q)^2 - sin(q)^2) - c14*cos(q)*sin(q) + c34*cos(q)*sin(q))
    cE61 = cos(q)^2*(c61*cos(q) + c41*sin(q)) + sin(q)^2*(c63*cos(q) + c43*sin(q)) + 2*cos(q)*sin(q)*(c65*cos(q) + c45*sin(q))
    cE62 = c62*cos(q) + c42*sin(q)
    cE63 = cos(q)^2*(c63*cos(q) + c43*sin(q)) + sin(q)^2*(c61*cos(q) + c41*sin(q)) - 2*cos(q)*sin(q)*(c65*cos(q) + c45*sin(q))
    cE64 = cos(q)*(c64*cos(q) + c44*sin(q)) - sin(q)*(c66*cos(q) + c46*sin(q))
    cE65 = (cos(q)^2 - sin(q)^2)*(c65*cos(q) + c45*sin(q)) - cos(q)*sin(q)*(c61*cos(q) + c41*sin(q)) + cos(q)*sin(q)*(c63*cos(q) + c43*sin(q))
    cE66 = cos(q)*(c66*cos(q) + c46*sin(q)) + sin(q)*(c64*cos(q) + c44*sin(q))
    eES11 = cos(q)^2*(e11*cos(q) + e31*sin(q)) + sin(q)^2*(e13*cos(q) + e33*sin(q)) + 2*cos(q)*sin(q)*(e15*cos(q) + e35*sin(q))
    eES12 = e12*cos(q) + e32*sin(q)
    eES13 = cos(q)^2*(e13*cos(q) + e33*sin(q)) + sin(q)^2*(e11*cos(q) + e31*sin(q)) - 2*cos(q)*sin(q)*(e15*cos(q) + e35*sin(q))
    eES14 = cos(q)*(e14*cos(q) + e34*sin(q)) - sin(q)*(e16*cos(q) + e36*sin(q))
    eES15 = (cos(q)^2 - sin(q)^2)*(e15*cos(q) + e35*sin(q)) - cos(q)*sin(q)*(e11*cos(q) + e31*sin(q)) + cos(q)*sin(q)*(e13*cos(q) + e33*sin(q))
    eES16 = cos(q)*(e16*cos(q) + e36*sin(q)) + sin(q)*(e14*cos(q) + e34*sin(q))
    eES21 = cos(q)*(e16*cos(q) + e36*sin(q)) + sin(q)*(e14*cos(q) + e34*sin(q))
    eES22 = e22
    eES23 = e21*sin(q)^2 + e23*cos(q)^2 - 2*e25*cos(q)*sin(q)
    eES24 = e24*cos(q) - e26*sin(q)
    eES25 = e25*(cos(q)^2 - sin(q)^2) - e21*cos(q)*sin(q) + e23*cos(q)*sin(q)
    eES26 = e26*cos(q) + e24*sin(q)
    eES31 = cos(q)^2*(e31*cos(q) - e11*sin(q)) + sin(q)^2*(e33*cos(q) - e13*sin(q)) + 2*cos(q)*sin(q)*(e35*cos(q) - e15*sin(q))
    eES32 = e32*cos(q) - e12*sin(q)
    eES33 = cos(q)^2*(e33*cos(q) - e13*sin(q)) + sin(q)^2*(e31*cos(q) - e11*sin(q)) - 2*cos(q)*sin(q)*(e35*cos(q) - e15*sin(q))
    eES34 = cos(q)*(e34*cos(q) - e14*sin(q)) - sin(q)*(e36*cos(q) - e16*sin(q))
    eES35 = (cos(q)^2 - sin(q)^2)*(e35*cos(q) - e15*sin(q)) - cos(q)*sin(q)*(e31*cos(q) - e11*sin(q)) + cos(q)*sin(q)*(e33*cos(q) - e13*sin(q))
    eES36 = cos(q)*(e36*cos(q) - e16*sin(q)) + sin(q)*(e34*cos(q) - e14*sin(q))
    epsilon_xx = cos(q)*(epsilon11*cos(q) + epsilon31*sin(q)) + sin(q)*(epsilon13*cos(q) + epsilon33*sin(q))
    epsilon_xy = epsilon12*cos(q) + epsilon32*sin(q)
    epsilon_xz = cos(q)*(epsilon13*cos(q) + epsilon33*sin(q)) - sin(q)*(epsilon11*cos(q) + epsilon31*sin(q))
    epsilon_yx = epsilon21*cos(q) + epsilon23*sin(q)
    epsilon_yy = epsilon22
    epsilon_yz = epsilon23*cos(q) - epsilon21*sin(q)
    epsilon_zx = cos(q)*(epsilon31*cos(q) - epsilon11*sin(q)) + sin(q)*(epsilon33*cos(q) - epsilon13*sin(q))
    epsilon_zy = epsilon32*cos(q) - epsilon12*sin(q)
    epsilon_zz = cos(q)*(epsilon33*cos(q) - epsilon13*sin(q)) - sin(q)*(epsilon31*cos(q) - epsilon11*sin(q))
  var14 "rotate along spatial-z"
    cE11 = cos(q)^2*(c21*sin(q)^2 + c11*cos(q)^2 + 2*c61*cos(q)*sin(q)) + sin(q)^2*(c22*sin(q)^2 + c12*cos(q)^2 + 2*c62*cos(q)*sin(q)) + 2*cos(q)*sin(q)*(c26*sin(q)^2 + c16*cos(q)^2 + 2*c66*cos(q)*sin(q))
    cE12 = cos(q)^2*(c22*sin(q)^2 + c12*cos(q)^2 + 2*c62*cos(q)*sin(q)) + sin(q)^2*(c21*sin(q)^2 + c11*cos(q)^2 + 2*c61*cos(q)*sin(q)) - 2*cos(q)*sin(q)*(c26*sin(q)^2 + c16*cos(q)^2 + 2*c66*cos(q)*sin(q))
    cE13 = c23*sin(q)^2 + c13*cos(q)^2 + 2*c63*cos(q)*sin(q)
    cE14 = cos(q)*(c24*sin(q)^2 + c14*cos(q)^2 + 2*c64*cos(q)*sin(q)) - sin(q)*(c25*sin(q)^2 + c15*cos(q)^2 + 2*c65*cos(q)*sin(q))
    cE15 = cos(q)*(c25*sin(q)^2 + c15*cos(q)^2 + 2*c65*cos(q)*sin(q)) + sin(q)*(c24*sin(q)^2 + c14*cos(q)^2 + 2*c64*cos(q)*sin(q))
    cE16 = (cos(q)^2 - sin(q)^2)*(c26*sin(q)^2 + c16*cos(q)^2 + 2*c66*cos(q)*sin(q)) - cos(q)*sin(q)*(c21*sin(q)^2 + c11*cos(q)^2 + 2*c61*cos(q)*sin(q)) + cos(q)*sin(q)*(c22*sin(q)^2 + c12*cos(q)^2 + 2*c62*cos(q)*sin(q))
    cE21 = cos(q)^2*(c11*sin(q)^2 + c21*cos(q)^2 - 2*c61*cos(q)*sin(q)) + sin(q)^2*(c12*sin(q)^2 + c22*cos(q)^2 - 2*c62*cos(q)*sin(q)) + 2*cos(q)*sin(q)*(c16*sin(q)^2 + c26*cos(q)^2 - 2*c66*cos(q)*sin(q))
    cE22 = cos(q)^2*(c12*sin(q)^2 + c22*cos(q)^2 - 2*c62*cos(q)*sin(q)) + sin(q)^2*(c11*sin(q)^2 + c21*cos(q)^2 - 2*c61*cos(q)*sin(q)) - 2*cos(q)*sin(q)*(c16*sin(q)^2 + c26*cos(q)^2 - 2*c66*cos(q)*sin(q))
    cE23 = c13*sin(q)^2 + c23*cos(q)^2 - 2*c63*cos(q)*sin(q)
    cE24 = cos(q)*(c14*sin(q)^2 + c24*cos(q)^2 - 2*c64*cos(q)*sin(q)) - sin(q)*(c15*sin(q)^2 + c25*cos(q)^2 - 2*c65*cos(q)*sin(q))
    cE25 = cos(q)*(c15*sin(q)^2 + c25*cos(q)^2 - 2*c65*cos(q)*sin(q)) + sin(q)*(c14*sin(q)^2 + c24*cos(q)^2 - 2*c64*cos(q)*sin(q))
    cE26 = (cos(q)^2 - sin(q)^2)*(c16*sin(q)^2 + c26*cos(q)^2 - 2*c66*cos(q)*sin(q)) - cos(q)*sin(q)*(c11*sin(q)^2 + c21*cos(q)^2 - 2*c61*cos(q)*sin(q)) + cos(q)*sin(q)*(c12*sin(q)^2 + c22*cos(q)^2 - 2*c62*cos(q)*sin(q))
    cE31 = c32*sin(q)^2 + c31*cos(q)^2 + 2*c36*cos(q)*sin(q)
    cE32 = c31*sin(q)^2 + c32*cos(q)^2 - 2*c36*cos(q)*sin(q)
    cE33 = c33
    cE34 = c34*cos(q) - c35*sin(q)
    cE35 = c35*cos(q) + c34*sin(q)
    cE36 = c36*(cos(q)^2 - sin(q)^2) - c31*cos(q)*sin(q) + c32*cos(q)*sin(q)
    cE41 = cos(q)^2*(c41*cos(q) - c51*sin(q)) + sin(q)^2*(c42*cos(q) - c52*sin(q)) + 2*cos(q)*sin(q)*(c46*cos(q) - c56*sin(q))
    cE42 = cos(q)^2*(c42*cos(q) - c52*sin(q)) + sin(q)^2*(c41*cos(q) - c51*sin(q)) - 2*cos(q)*sin(q)*(c46*cos(q) - c56*sin(q))
    cE43 = c43*cos(q) - c53*sin(q)
    cE44 = cos(q)*(c44*cos(q) - c54*sin(q)) - sin(q)*(c45*cos(q) - c55*sin(q))
    cE45 = cos(q)*(c45*cos(q) - c55*sin(q)) + sin(q)*(c44*cos(q) - c54*sin(q))
    cE46 = (cos(q)^2 - sin(q)^2)*(c46*cos(q) - c56*sin(q)) - cos(q)*sin(q)*(c41*cos(q) - c51*sin(q)) + cos(q)*sin(q)*(c42*cos(q) - c52*sin(q))
    cE51 = cos(q)^2*(c51*cos(q) + c41*sin(q)) + sin(q)^2*(c52*cos(q) + c42*sin(q)) + 2*cos(q)*sin(q)*(c56*cos(q) + c46*sin(q))
    cE52 = cos(q)^2*(c52*cos(q) + c42*sin(q)) + sin(q)^2*(c51*cos(q) + c41*sin(q)) - 2*cos(q)*sin(q)*(c56*cos(q) + c46*sin(q))
    cE53 = c53*cos(q) + c43*sin(q)
    cE54 = cos(q)*(c54*cos(q) + c44*sin(q)) - sin(q)*(c55*cos(q) + c45*sin(q))
    cE55 = cos(q)*(c55*cos(q) + c45*sin(q)) + sin(q)*(c54*cos(q) + c44*sin(q))
    cE56 = (cos(q)^2 - sin(q)^2)*(c56*cos(q) + c46*sin(q)) - cos(q)*sin(q)*(c51*cos(q) + c41*sin(q)) + cos(q)*sin(q)*(c52*cos(q) + c42*sin(q))
    cE61 = cos(q)^2*(c61*(cos(q)^2 - sin(q)^2) - c11*cos(q)*sin(q) + c21*cos(q)*sin(q)) + sin(q)^2*(c62*(cos(q)^2 - sin(q)^2) - c12*cos(q)*sin(q) + c22*cos(q)*sin(q)) + 2*cos(q)*sin(q)*(c66*(cos(q)^2 - sin(q)^2) - c16*cos(q)*sin(q) + c26*cos(q)*sin(q))
    cE62 = cos(q)^2*(c62*(cos(q)^2 - sin(q)^2) - c12*cos(q)*sin(q) + c22*cos(q)*sin(q)) + sin(q)^2*(c61*(cos(q)^2 - sin(q)^2) - c11*cos(q)*sin(q) + c21*cos(q)*sin(q)) - 2*cos(q)*sin(q)*(c66*(cos(q)^2 - sin(q)^2) - c16*cos(q)*sin(q) + c26*cos(q)*sin(q))
    cE63 = c63*(cos(q)^2 - sin(q)^2) - c13*cos(q)*sin(q) + c23*cos(q)*sin(q)
    cE64 = cos(q)*(c64*(cos(q)^2 - sin(q)^2) - c14*cos(q)*sin(q) + c24*cos(q)*sin(q)) - sin(q)*(c65*(cos(q)^2 - sin(q)^2) - c15*cos(q)*sin(q) + c25*cos(q)*sin(q))
    cE65 = cos(q)*(c65*(cos(q)^2 - sin(q)^2) - c15*cos(q)*sin(q) + c25*cos(q)*sin(q)) + sin(q)*(c64*(cos(q)^2 - sin(q)^2) - c14*cos(q)*sin(q) + c24*cos(q)*sin(q))
    cE66 = (cos(q)^2 - sin(q)^2)*(c66*(cos(q)^2 - sin(q)^2) - c16*cos(q)*sin(q) + c26*cos(q)*sin(q)) - cos(q)*sin(q)*(c61*(cos(q)^2 - sin(q)^2) - c11*cos(q)*sin(q) + c21*cos(q)*sin(q)) + cos(q)*sin(q)*(c62*(cos(q)^2 - sin(q)^2) - c12*cos(q)*sin(q) + c22*cos(q)*sin(q))
    eES11 = cos(q)^2*(e11*cos(q) + e21*sin(q)) + sin(q)^2*(e12*cos(q) + e22*sin(q)) + 2*cos(q)*sin(q)*(e16*cos(q) + e26*sin(q))
    eES12 = cos(q)^2*(e12*cos(q) + e22*sin(q)) + sin(q)^2*(e11*cos(q) + e21*sin(q)) - 2*cos(q)*sin(q)*(e16*cos(q) + e26*sin(q))
    eES13 = e13*cos(q) + e23*sin(q)
    eES14 = cos(q)*(e14*cos(q) + e24*sin(q)) - sin(q)*(e15*cos(q) + e25*sin(q))
    eES15 = cos(q)*(e15*cos(q) + e25*sin(q)) + sin(q)*(e14*cos(q) + e24*sin(q))
    eES16 = (cos(q)^2 - sin(q)^2)*(e16*cos(q) + e26*sin(q)) - cos(q)*sin(q)*(e11*cos(q) + e21*sin(q)) + cos(q)*sin(q)*(e12*cos(q) + e22*sin(q))
    eES21 = cos(q)^2*(e21*cos(q) - e11*sin(q)) + sin(q)^2*(e22*cos(q) - e12*sin(q)) + 2*cos(q)*sin(q)*(e26*cos(q) - e16*sin(q))
    eES22 = cos(q)^2*(e22*cos(q) - e12*sin(q)) + sin(q)^2*(e21*cos(q) - e11*sin(q)) - 2*cos(q)*sin(q)*(e26*cos(q) - e16*sin(q))
    eES23 = e23*cos(q) - e13*sin(q)
    eES24 = cos(q)*(e24*cos(q) - e14*sin(q)) - sin(q)*(e25*cos(q) - e15*sin(q))
    eES25 = cos(q)*(e25*cos(q) - e15*sin(q)) + sin(q)*(e24*cos(q) - e14*sin(q))
    eES26 = (cos(q)^2 - sin(q)^2)*(e26*cos(q) - e16*sin(q)) - cos(q)*sin(q)*(e21*cos(q) - e11*sin(q)) + cos(q)*sin(q)*(e22*cos(q) - e12*sin(q))
    eES31 = e32*sin(q)^2 + e31*cos(q)^2 + 2*e36*cos(q)*sin(q)
    eES32 = e31*sin(q)^2 + e32*cos(q)^2 - 2*e36*cos(q)*sin(q)
    eES33 = e33
    eES34 = e34
    eES35 = e35*cos(q) + e34*sin(q)
    eES36 = e36*(cos(q)^2 - sin(q)^2) - e31*cos(q)*sin(q) + e32*cos(q)*sin(q)
    epsilon_xx = cos(q)*(epsilon11*cos(q) + epsilon21*sin(q)) + sin(q)*(epsilon12*cos(q) + epsilon22*sin(q))
    epsilon_xy = cos(q)*(epsilon12*cos(q) + epsilon22*sin(q)) - sin(q)*(epsilon11*cos(q) + epsilon21*sin(q))
    epsilon_xz = epsilon13*cos(q) + epsilon23*sin(q)
    epsilon_yx = cos(q)*(epsilon21*cos(q) - epsilon11*sin(q)) + sin(q)*(epsilon22*cos(q) - epsilon12*sin(q))
    epsilon_yy = cos(q)*(epsilon22*cos(q) - epsilon12*sin(q)) - sin(q)*(epsilon21*cos(q) - epsilon11*sin(q))
    epsilon_yz = epsilon23*cos(q) - epsilon13*sin(q)
    epsilon_zx = epsilon31*cos(q) + epsilon32*sin(q)
    epsilon_zy = epsilon32*cos(q) - epsilon31*sin(q)
    epsilon_zz = epsilon33
  var10 "Y-prop" (disabled)
  var11 "Z-prop" (disabled)

Couplings
  maxop1: Maximum "内场最大值" on domains 1
  maxop2: Maximum "外场最大值" on domains 2

Coordinate systems
  sys2: Rotated "Rotated System 2"

Geometry
  geom1 "Geometry 1" (3D, length unit µm)
    blk1: Block (disabled) | size = {a, a, a}
    blk2: Block | size = {a, b, c}
    blk3: Block | pos = {0, 0, -c}; size = {a, b, c}
    fin: Finalize "Form Union"

Materials
  mat1: Common "Lead Zirconate Titanate (PZT-5H)" (disabled) on domains 1
    def "Basic"
      relpermittivity = diag{1704.4, 1704.4, 1433.6}
      density = 7500[kg/m^3]
    StrainCharge "Strain-charge form"
      sE = {1.65e-011[1/Pa], -4.78e-012[1/Pa], -8.45e-012[1/Pa], 0[1/Pa], 0[1/Pa], 0[1/Pa], -4.78e-012[1/Pa], 1.65e-011[1/Pa], -8.45e-012[1/Pa], 0[1/Pa], 0[1/Pa], 0[1/Pa], -8.45e-012[1/Pa], -8.45e-012[1/Pa], 2.07e-011[1/Pa], 0[1/Pa], 0[1/Pa], 0[1/Pa], 0[1/Pa], 0[1/Pa], 0[1/Pa], 4.35e-011[1/Pa], 0[1/Pa], 0[1/Pa], 0[1/Pa], 0[1/Pa], 0[1/Pa], 0[1/Pa], 4.35e-011[1/Pa], 0[1/Pa], 0[1/Pa], 0[1/Pa], 0[1/Pa], 0[1/Pa], 0[1/Pa], 4.26e-011[1/Pa]}
      dET = {0[C/N], 0[C/N], -2.74e-010[C/N], 0[C/N], 0[C/N], -2.74e-010[C/N], 0[C/N], 0[C/N], 5.93e-010[C/N], 0[C/N], 7.41e-010[C/N], 0[C/N], 7.41e-010[C/N], 0[C/N], 0[C/N], 0[C/N], 0[C/N], 0[C/N]}
      epsilonrT = diag{3130, 3130, 3400}
      eta_sE = {0, 0, 0, 0, 0, 0, 0, 0, 0, 0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}
      eta_dET = {0, 0, 0, 0, 0, 0, 0, 0, 0, 0, 0, 0, 0, 0, 0, 0, 0, 0}
      eta_epsilonT = 0
    StressCharge "Stress-charge form"
      cE = {1.27205e+011[Pa], 8.02122e+010[Pa], 8.46702e+010[Pa], 0[Pa], 0[Pa], 0[Pa], 8.02122e+010[Pa], 1.27205e+011[Pa], 8.46702e+010[Pa], 0[Pa], 0[Pa], 0[Pa], 8.46702e+010[Pa], 8.46702e+010[Pa], 1.17436e+011[Pa], 0[Pa], 0[Pa], 0[Pa], 0[Pa], 0[Pa], 0[Pa], 2.29885e+010[Pa], 0[Pa], 0[Pa], 0[Pa], 0[Pa], 0[Pa], 0[Pa], 2.29885e+010[Pa], 0[Pa], 0[Pa], 0[Pa], 0[Pa], 0[Pa], 0[Pa], 2.34742e+010[Pa]}
      eES = {0[C/m^2], 0[C/m^2], -6.62281[C/m^2], 0[C/m^2], 0[C/m^2], -6.62281[C/m^2], 0[C/m^2], 0[C/m^2], 23.2403[C/m^2], 0[C/m^2], 17.0345[C/m^2], 0[C/m^2], 17.0345[C/m^2], 0[C/m^2], 0[C/m^2], 0[C/m^2], 0[C/m^2], 0[C/m^2]}
      epsilonrS = diag{1704.4, 1704.4, 1433.6}
      eta_cE = {0, 0, 0, 0, 0, 0, 0, 0, 0, 0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}
      eta_eES = {0, 0, 0, 0, 0, 0, 0, 0, 0, 0, 0, 0, 0, 0, 0, 0, 0, 0}
      eta_epsilonS = 0
  mat2: Common "Air" on domains 2
    def "Basic"
      thermalexpansioncoefficient = alpha_p(pA,T)
      molarmass = 0.02897[kg/mol]
      bulkviscosity = muB(T)
      relpermeability = 1
      relpermittivity = 1
      dynamicviscosity = eta(T)
      ratioofspecificheat = 1.4
      electricconductivity = 0[S/m]
      heatcapacity = Cp(T)
      density = rho(pA,T)
      thermalconductivity = k(T)
      soundspeed = cs(T)
      eta: Piecewise | arg = T; pieces = {200.0, 1600.0, -8.38278E-7+8.35717342E-8*T^1-7.69429583E-11*T^2+4.6437266E-14*T^3-1.06585607E-17*T^4}; argunit = K; fununit = Pa*s
      Cp: Piecewise | arg = T; pieces = {200.0, 1600.0, 1047.63657-0.372589265*T^1+9.45304214E-4*T^2-6.02409443E-7*T^3+1.2858961E-10*T^4}; argunit = K; fununit = J/(kg*K)
      rho: Analytic | expr = pA*0.02897/R_const[K*mol/J]/T; args = {pA, T}; fununit = kg/m^3; argunit = {Pa, K}
      k: Piecewise | arg = T; pieces = {200.0, 1600.0, -0.00227583562+1.15480022E-4*T^1-7.90252856E-8*T^2+4.11702505E-11*T^3-7.43864331E-15*T^4}; argunit = K; fununit = W/(m*K)
      cs: Analytic | expr = sqrt(1.4*R_const[K*mol/J]/0.02897*T); args = T; fununit = m/s; argunit = K
      an1: Analytic | funcname = alpha_p; expr = -1/rho(pA,T)*d(rho(pA,T),T); args = {pA, T}; fununit = 1/K; argunit = {Pa, K}
      an2: Analytic "Analytic 2a" | funcname = muB; expr = 0.6*eta(T); args = T; fununit = Pa*s; argunit = K
    RefractiveIndex
      n = 1
      ki = 0
    NonlinearModel
      BA = (def.gamma+1)/2
    idealGas
      Rs = R_const/Mn
      heatcapacity = Cp(T)
      ratioofspecificheat = 1.4
      molarmass = 0.02897
      Cp: Piecewise | arg = T; pieces = {200.0, 1600.0, 1047.63657-0.372589265*T^1+9.45304214E-4*T^2-6.02409443E-7*T^3+1.2858961E-10*T^4}; argunit = K; fununit = J/(kg*K)
  mat3: Common "Lithium Niobate" (disabled) on domains 1
    def "Basic"
      relpermittivity = diag{43.6, 43.6, 29.16}
      density = 4700[kg/m^3]
    StrainCharge "Strain-charge form"
      sE = {5.78e-012[1/Pa], -1.01e-012[1/Pa], -1.47e-012[1/Pa], -1.02e-012[1/Pa], 0[1/Pa], 0[1/Pa], -1.01e-012[1/Pa], 5.78e-012[1/Pa], -1.47e-012[1/Pa], 1.02e-012[1/Pa], 0[1/Pa], 0[1/Pa], -1.47e-012[1/Pa], -1.47e-012[1/Pa], 5.02e-012[1/Pa], 0[1/Pa], 0[1/Pa], 0[1/Pa], -1.02e-012[1/Pa], 1.02e-012[1/Pa], 0[1/Pa], 1.7e-011[1/Pa], 0[1/Pa], 0[1/Pa], 0[1/Pa], 0[1/Pa], 0[1/Pa], 0[1/Pa], 1.7e-011[1/Pa], -2.04e-012[1/Pa], 0[1/Pa], 0[1/Pa], 0[1/Pa], 0[1/Pa], -2.04e-012[1/Pa], 1.36e-011[1/Pa]}
      dET = {0[C/N], -2.1e-011[C/N], -1e-012[C/N], 0[C/N], 2.1e-011[C/N], -1e-012[C/N], 0[C/N], 0[C/N], 6e-012[C/N], 0[C/N], 6.8e-011[C/N], 0[C/N], 6.8e-011[C/N], 0[C/N], 0[C/N], -4.2e-011[C/N], 0[C/N], 0[C/N]}
      epsilonrT = diag{84, 84, 30}
      eta_sE = {0, 0, 0, 0, 0, 0, 0, 0, 0, 0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}
      eta_dET = {0, 0, 0, 0, 0, 0, 0, 0, 0, 0, 0, 0, 0, 0, 0, 0, 0, 0}
      eta_epsilonT = 0
    StressCharge "Stress-charge form"
      cE = {2.02897e+011[Pa], 5.29177e+010[Pa], 7.49098e+010[Pa], 8.99874e+009[Pa], 0[Pa], 0[Pa], 5.29177e+010[Pa], 2.02897e+011[Pa], 7.49098e+010[Pa], -8.99874e+009[Pa], 0[Pa], 0[Pa], 7.49098e+010[Pa], 7.49098e+010[Pa], 2.43075e+011[Pa], 0[Pa], 0[Pa], 0[Pa], 8.99874e+009[Pa], -8.99874e+009[Pa], 0[Pa], 5.99034e+010[Pa], 0[Pa], 0[Pa], 0[Pa], 0[Pa], 0[Pa], 0[Pa], 5.99018e+010[Pa], 8.98526e+009[Pa], 0[Pa], 0[Pa], 0[Pa], 0[Pa], 8.98526e+009[Pa], 7.48772e+010[Pa]}
      eES = {0[C/m^2], -2.53764[C/m^2], 0.193644[C/m^2], 0[C/m^2], 2.53764[C/m^2], 0.193644[C/m^2], 0[C/m^2], 0[C/m^2], 1.30863[C/m^2], 0[C/m^2], 3.69548[C/m^2], 0[C/m^2], 3.69594[C/m^2], 0[C/m^2], 0[C/m^2], -2.53384[C/m^2], 0[C/m^2], 0[C/m^2]}
      epsilonrS = diag{43.6, 43.6, 29.16}
      eta_cE = {0, 0, 0, 0, 0, 0, 0, 0, 0, 0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}
      eta_eES = {0, 0, 0, 0, 0, 0, 0, 0, 0, 0, 0, 0, 0, 0, 0, 0, 0, 0}
      eta_epsilonS = 0
  mat5: Common "ref-Lithium Niobate" (disabled) on domains 1
    def "Basic"
      relpermittivity = diag{44, 44, 29}
      density = 4647[kg/m^3]
    StrainCharge "Strain-charge form"
      sE = {5.78e-012[1/Pa], -1.01e-012[1/Pa], -1.47e-012[1/Pa], -1.02e-012[1/Pa], 0[1/Pa], 0[1/Pa], -1.01e-012[1/Pa], 5.78e-012[1/Pa], -1.47e-012[1/Pa], 1.02e-012[1/Pa], 0[1/Pa], 0[1/Pa], -1.47e-012[1/Pa], -1.47e-012[1/Pa], 5.02e-012[1/Pa], 0[1/Pa], 0[1/Pa], 0[1/Pa], -1.02e-012[1/Pa], 1.02e-012[1/Pa], 0[1/Pa], 1.7e-011[1/Pa], 0[1/Pa], 0[1/Pa], 0[1/Pa], 0[1/Pa], 0[1/Pa], 0[1/Pa], 1.7e-011[1/Pa], -2.04e-012[1/Pa], 0[1/Pa], 0[1/Pa], 0[1/Pa], 0[1/Pa], -2.04e-012[1/Pa], 1.36e-011[1/Pa]}
      dET = {0[C/N], -2.1e-011[C/N], -1e-012[C/N], 0[C/N], 2.1e-011[C/N], -1e-012[C/N], 0[C/N], 0[C/N], 6e-012[C/N], 0[C/N], 6.8e-011[C/N], 0[C/N], 6.8e-011[C/N], 0[C/N], 0[C/N], -4.2e-011[C/N], 0[C/N], 0[C/N]}
      epsilonrT = diag{84, 84, 30}
      eta_sE = {0, 0, 0, 0, 0, 0, 0, 0, 0, 0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}
      eta_dET = {0, 0, 0, 0, 0, 0, 0, 0, 0, 0, 0, 0, 0, 0, 0, 0, 0, 0}
      eta_epsilonT = 0
    StressCharge "Stress-charge form"
      cE = {2.03e+011[Pa], 0.573e+011[Pa], 0.752e+011[Pa], 0.085e+011[Pa], 0[Pa], 0[Pa], 0.573e+011[Pa], 2.03e+011[Pa], 0.752e+011[Pa], -0.085e+011[Pa], 0[Pa], 0[Pa], 0.752e+011[Pa], 0.752e+011[Pa], 2.424e+011[Pa], 0[Pa], 0[Pa], 0[Pa], 0.085e+011[Pa], -0.085e+011[Pa], 0[Pa], 0.595e+011[Pa], 0[Pa], 0[Pa], 0[Pa], 0[Pa], 0[Pa], 0[Pa], 0.595e+011[Pa], 0.085e+011[Pa], 0[Pa], 0[Pa], 0[Pa], 0[Pa], 0.085e+011[Pa], 0.728e+011[Pa]}
      eES = {0[C/m^2], -2.5[C/m^2], 0.23[C/m^2], 0[C/m^2], 2.5[C/m^2], 0.23[C/m^2], 0[C/m^2], 0[C/m^2], 1.33[C/m^2], 0[C/m^2], 3.7[C/m^2], 0[C/m^2], 3.7[C/m^2], 0[C/m^2], 0[C/m^2], -2.5[C/m^2], 0[C/m^2], 0[C/m^2]}
      epsilonrS = diag{44.3, 44.3, 27.9}
      eta_cE = {0, 0, 0, 0, 0, 0, 0, 0, 0, 0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}
      eta_eES = {0, 0, 0, 0, 0, 0, 0, 0, 0, 0, 0, 0, 0, 0, 0, 0, 0, 0}
      eta_epsilonS = 0
  mat6: Common "Lithium Niobate (128-Ycut)" (disabled) on domains 1
    def "Basic"
      relpermittivity = {43.6, 0, 0, 0, 38.1266760862296, -7.00553514371, 0, -7.00553514371, 34.6333239137704}
      density = 4700[kg/m^3]
    StrainCharge "Strain-charge form"
      sE = {5.78e-012[1/Pa], -1.01e-012[1/Pa], -1.47e-012[1/Pa], -1.02e-012[1/Pa], 0[1/Pa], 0[1/Pa], -1.01e-012[1/Pa], 5.78e-012[1/Pa], -1.47e-012[1/Pa], 1.02e-012[1/Pa], 0[1/Pa], 0[1/Pa], -1.47e-012[1/Pa], -1.47e-012[1/Pa], 5.02e-012[1/Pa], 0[1/Pa], 0[1/Pa], 0[1/Pa], -1.02e-012[1/Pa], 1.02e-012[1/Pa], 0[1/Pa], 1.7e-011[1/Pa], 0[1/Pa], 0[1/Pa], 0[1/Pa], 0[1/Pa], 0[1/Pa], 0[1/Pa], 1.7e-011[1/Pa], -2.04e-012[1/Pa], 0[1/Pa], 0[1/Pa], 0[1/Pa], 0[1/Pa], -2.04e-012[1/Pa], 1.36e-011[1/Pa]}
      dET = {0[C/N], -2.1e-011[C/N], -1e-012[C/N], 0[C/N], 2.1e-011[C/N], -1e-012[C/N], 0[C/N], 0[C/N], 6e-012[C/N], 0[C/N], 6.8e-011[C/N], 0[C/N], 6.8e-011[C/N], 0[C/N], 0[C/N], -4.2e-011[C/N], 0[C/N], 0[C/N]}
      epsilonrT = diag{84, 84, 30}
      eta_sE = {0, 0, 0, 0, 0, 0, 0, 0, 0, 0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}
      eta_dET = {0, 0, 0, 0, 0, 0, 0, 0, 0, 0, 0, 0, 0, 0, 0, 0, 0, 0}
      eta_epsilonT = 0
    StressCharge "Stress-charge form"
      cE = {202897000000.000[Pa], 69985003703.7601[Pa], 57842496296.2399[Pa], 12846412559.7257[Pa], 0[Pa], 0[Pa], 69985003703.7601[Pa], 193974816139.586[Pa], 90329575935.8435[Pa], 9312427364.80178[Pa], 0[Pa], 0[Pa], 57842496296.2399[Pa], 90329575935.8435[Pa], 221157631988.727[Pa], 8002851241.54816[Pa], 0[Pa], 0[Pa], 12846412559.7257[Pa], 9312427364.80178[Pa], 8002851241.54816[Pa], 75323175935.8435[Pa], 0[Pa], 0[Pa], 0[Pa], 0[Pa], 0[Pa], 0[Pa], 56859702044.8397[Pa], -5091552177.98091[Pa], 0[Pa], 0[Pa], 0[Pa], 0[Pa], -5091552177.98091[Pa], 77919297955.1603[Pa]}
      eES = {0[C/m^2], -1.88046845805[C/m^2], 1.71492074062[C/m^2], 0[C/m^2], 4.44671672729[C/m^2], -2.69210151551[C/m^2], 0[C/m^2], -1.52213689132[C/m^2], 2.31358239613[C/m^2], 0[C/m^2], 0.0673829098574[C/m^2], 0.633808626784[C/m^2], 4.47242813732[C/m^2], 0[C/m^2], 0[C/m^2], 0.278754705196[C/m^2], 0[C/m^2], 0[C/m^2]}
      epsilonrS = diag{43.6, 43.6, 29.16}
      eta_cE = {0, 0, 0, 0, 0, 0, 0, 0, 0, 0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}
      eta_eES = {0, 0, 0, 0, 0, 0, 0, 0, 0, 0, 0, 0, 0, 0, 0, 0, 0, 0}
      eta_epsilonS = 0
  mat7: Common "Zinc Oxide" on domains 1
    def "Basic"
      relpermittivity = diag{8.5446, 8.5446, 10.204}
      density = 5610[kg/m^3]
    StrainCharge "Strain-charge form"
      sE = {7.86e-012[1/Pa], -3.43e-012[1/Pa], -2.21e-012[1/Pa], 0[1/Pa], 0[1/Pa], 0[1/Pa], -3.43e-012[1/Pa], 7.86e-012[1/Pa], -2.21e-012[1/Pa], 0[1/Pa], 0[1/Pa], 0[1/Pa], -2.21e-012[1/Pa], -2.21e-012[1/Pa], 6.94e-012[1/Pa], 0[1/Pa], 0[1/Pa], 0[1/Pa], 0[1/Pa], 0[1/Pa], 0[1/Pa], 2.36e-011[1/Pa], 0[1/Pa], 0[1/Pa], 0[1/Pa], 0[1/Pa], 0[1/Pa], 0[1/Pa], 2.36e-011[1/Pa], 0[1/Pa], 0[1/Pa], 0[1/Pa], 0[1/Pa], 0[1/Pa], 0[1/Pa], 2.26e-011[1/Pa]}
      dET = {0[C/N], 0[C/N], -5.43e-012[C/N], 0[C/N], 0[C/N], -5.43e-012[C/N], 0[C/N], 0[C/N], 1.167e-011[C/N], 0[C/N], -1.134e-011[C/N], 0[C/N], -1.134e-011[C/N], 0[C/N], 0[C/N], 0[C/N], 0[C/N], 0[C/N]}
      epsilonrT = diag{9.16, 9.16, 12.64}
      eta_sE = {0, 0, 0, 0, 0, 0, 0, 0, 0, 0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}
      eta_dET = {0, 0, 0, 0, 0, 0, 0, 0, 0, 0, 0, 0, 0, 0, 0, 0, 0, 0}
      eta_epsilonT = 0
    StressCharge "Stress-charge form"
      cE = {2.09714e+011[Pa], 1.2114e+011[Pa], 1.05359e+011[Pa], 0[Pa], 0[Pa], 0[Pa], 1.2114e+011[Pa], 2.09714e+011[Pa], 1.05359e+011[Pa], 0[Pa], 0[Pa], 0[Pa], 1.05359e+011[Pa], 1.05359e+011[Pa], 2.11194e+011[Pa], 0[Pa], 0[Pa], 0[Pa], 0[Pa], 0[Pa], 0[Pa], 4.23729e+010[Pa], 0[Pa], 0[Pa], 0[Pa], 0[Pa], 0[Pa], 0[Pa], 4.23729e+010[Pa], 0[Pa], 0[Pa], 0[Pa], 0[Pa], 0[Pa], 0[Pa], 4.42478e+010[Pa]}
      eES = {0[C/m^2], 0[C/m^2], -0.567005[C/m^2], 0[C/m^2], 0[C/m^2], -0.567005[C/m^2], 0[C/m^2], 0[C/m^2], 1.32044[C/m^2], 0[C/m^2], -0.480508[C/m^2], 0[C/m^2], -0.480508[C/m^2], 0[C/m^2], 0[C/m^2], 0[C/m^2], 0[C/m^2], 0[C/m^2]}
      epsilonrS = diag{8.5446, 8.5446, 10.204}
      eta_cE = {0, 0, 0, 0, 0, 0, 0, 0, 0, 0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}
      eta_eES = {0, 0, 0, 0, 0, 0, 0, 0, 0, 0, 0, 0, 0, 0, 0, 0, 0, 0}
      eta_epsilonS = 0
  mat8: Common "Lead Zirconate Titanate (PZT-5A)" (disabled) on domains 1
    def "Basic"
      relpermittivity = diag{919.1, 919.1, 826.6}
      density = 7750[kg/m^3]
    StrainCharge "Strain-charge form"
      sE = {1.64e-011[1/Pa], -5.74e-012[1/Pa], -7.22e-012[1/Pa], 0[1/Pa], 0[1/Pa], 0[1/Pa], -5.74e-012[1/Pa], 1.64e-011[1/Pa], -7.22e-012[1/Pa], 0[1/Pa], 0[1/Pa], 0[1/Pa], -7.22e-012[1/Pa], -7.22e-012[1/Pa], 1.88e-011[1/Pa], 0[1/Pa], 0[1/Pa], 0[1/Pa], 0[1/Pa], 0[1/Pa], 0[1/Pa], 4.75e-011[1/Pa], 0[1/Pa], 0[1/Pa], 0[1/Pa], 0[1/Pa], 0[1/Pa], 0[1/Pa], 4.75e-011[1/Pa], 0[1/Pa], 0[1/Pa], 0[1/Pa], 0[1/Pa], 0[1/Pa], 0[1/Pa], 4.43e-011[1/Pa]}
      dET = {0[C/N], 0[C/N], -1.71e-010[C/N], 0[C/N], 0[C/N], -1.71e-010[C/N], 0[C/N], 0[C/N], 3.74e-010[C/N], 0[C/N], 5.84e-010[C/N], 0[C/N], 5.84e-010[C/N], 0[C/N], 0[C/N], 0[C/N], 0[C/N], 0[C/N]}
      epsilonrT = diag{1730, 1730, 1700}
      eta_sE = {0, 0, 0, 0, 0, 0, 0, 0, 0, 0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}
      eta_dET = {0, 0, 0, 0, 0, 0, 0, 0, 0, 0, 0, 0, 0, 0, 0, 0, 0, 0}
      eta_epsilonT = 0
    StressCharge "Stress-charge form"
      cE = {1.20346e+011[Pa], 7.51791e+010[Pa], 7.50901e+010[Pa], 0[Pa], 0[Pa], 0[Pa], 7.51791e+010[Pa], 1.20346e+011[Pa], 7.50901e+010[Pa], 0[Pa], 0[Pa], 0[Pa], 7.50901e+010[Pa], 7.50901e+010[Pa], 1.10867e+011[Pa], 0[Pa], 0[Pa], 0[Pa], 0[Pa], 0[Pa], 0[Pa], 2.10526e+010[Pa], 0[Pa], 0[Pa], 0[Pa], 0[Pa], 0[Pa], 0[Pa], 2.10526e+010[Pa], 0[Pa], 0[Pa], 0[Pa], 0[Pa], 0[Pa], 0[Pa], 2.25734e+010[Pa]}
      eES = {0[C/m^2], 0[C/m^2], -5.35116[C/m^2], 0[C/m^2], 0[C/m^2], -5.35116[C/m^2], 0[C/m^2], 0[C/m^2], 15.7835[C/m^2], 0[C/m^2], 12.2947[C/m^2], 0[C/m^2], 12.2947[C/m^2], 0[C/m^2], 0[C/m^2], 0[C/m^2], 0[C/m^2], 0[C/m^2]}
      epsilonrS = diag{919.1, 919.1, 826.6}
      eta_cE = {0, 0, 0, 0, 0, 0, 0, 0, 0, 0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}
      eta_eES = {0, 0, 0, 0, 0, 0, 0, 0, 0, 0, 0, 0, 0, 0, 0, 0, 0, 0}
      eta_epsilonS = 0
  mat9: Common "Lead Zirconate Titanate (PZT-4)" (disabled) on domains 1
    def "Basic"
      relpermittivity = diag{762.5, 762.5, 663.2}
      density = 7500[kg/m^3]
    StrainCharge "Strain-charge form"
      sE = {1.23e-011[1/Pa], -4.05e-012[1/Pa], -5.31e-012[1/Pa], 0[1/Pa], 0[1/Pa], 0[1/Pa], -4.05e-012[1/Pa], 1.23e-011[1/Pa], -5.31e-012[1/Pa], 0[1/Pa], 0[1/Pa], 0[1/Pa], -5.31e-012[1/Pa], -5.31e-012[1/Pa], 1.55e-011[1/Pa], 0[1/Pa], 0[1/Pa], 0[1/Pa], 0[1/Pa], 0[1/Pa], 0[1/Pa], 3.9e-011[1/Pa], 0[1/Pa], 0[1/Pa], 0[1/Pa], 0[1/Pa], 0[1/Pa], 0[1/Pa], 3.9e-011[1/Pa], 0[1/Pa], 0[1/Pa], 0[1/Pa], 0[1/Pa], 0[1/Pa], 0[1/Pa], 3.27e-011[1/Pa]}
      dET = {0[C/N], 0[C/N], -1.23e-010[C/N], 0[C/N], 0[C/N], -1.23e-010[C/N], 0[C/N], 0[C/N], 2.89e-010[C/N], 0[C/N], 4.96e-010[C/N], 0[C/N], 4.96e-010[C/N], 0[C/N], 0[C/N], 0[C/N], 0[C/N], 0[C/N]}
      epsilonrT = diag{1475, 1475, 1300}
      eta_sE = {0, 0, 0, 0, 0, 0, 0, 0, 0, 0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}
      eta_dET = {0, 0, 0, 0, 0, 0, 0, 0, 0, 0, 0, 0, 0, 0, 0, 0, 0, 0}
      eta_epsilonT = 0
    StressCharge "Stress-charge form"
      cE = {1.38999e+011[Pa], 7.78366e+010[Pa], 7.42836e+010[Pa], 0[Pa], 0[Pa], 0[Pa], 7.78366e+010[Pa], 1.38999e+011[Pa], 7.42836e+010[Pa], 0[Pa], 0[Pa], 0[Pa], 7.42836e+010[Pa], 7.42836e+010[Pa], 1.15412e+011[Pa], 0[Pa], 0[Pa], 0[Pa], 0[Pa], 0[Pa], 0[Pa], 2.5641e+010[Pa], 0[Pa], 0[Pa], 0[Pa], 0[Pa], 0[Pa], 0[Pa], 2.5641e+010[Pa], 0[Pa], 0[Pa], 0[Pa], 0[Pa], 0[Pa], 0[Pa], 3.0581e+010[Pa]}
      eES = {0[C/m^2], 0[C/m^2], -5.20279[C/m^2], 0[C/m^2], 0[C/m^2], -5.20279[C/m^2], 0[C/m^2], 0[C/m^2], 15.0804[C/m^2], 0[C/m^2], 12.7179[C/m^2], 0[C/m^2], 12.7179[C/m^2], 0[C/m^2], 0[C/m^2], 0[C/m^2], 0[C/m^2], 0[C/m^2]}
      epsilonrS = diag{762.5, 762.5, 663.2}
      eta_cE = {0, 0, 0, 0, 0, 0, 0, 0, 0, 0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}
      eta_eES = {0, 0, 0, 0, 0, 0, 0, 0, 0, 0, 0, 0, 0, 0, 0, 0, 0, 0}
      eta_epsilonS = 0
  mat10: Common "Cadmium Sulfide" (disabled) on domains 1
    def "Basic"
      relpermittivity = diag{9.0171, 9.0171, 9.5210}
      density = 4820[kg/m^3]
    StrainCharge "Strain-charge form"
      sE = {2.069e-011[1/Pa], -9.99e-012[1/Pa], -5.81e-012[1/Pa], 0[1/Pa], 0[1/Pa], 0[1/Pa], -9.99e-012[1/Pa], 2.069e-011[1/Pa], -5.81e-012[1/Pa], 0[1/Pa], 0[1/Pa], 0[1/Pa], -5.81e-012[1/Pa], -5.81e-012[1/Pa], 1.697e-011[1/Pa], 0[1/Pa], 0[1/Pa], 0[1/Pa], 0[1/Pa], 0[1/Pa], 0[1/Pa], 6.649e-011[1/Pa], 0[1/Pa], 0[1/Pa], 0[1/Pa], 0[1/Pa], 0[1/Pa], 0[1/Pa], 6.649e-011[1/Pa], 0[1/Pa], 0[1/Pa], 0[1/Pa], 0[1/Pa], 0[1/Pa], 0[1/Pa], 6.136e-011[1/Pa]}
      dET = {0[C/N], 0[C/N], -5e-012[C/N], 0[C/N], 0[C/N], -5e-012[C/N], 0[C/N], 0[C/N], 1.03e-011[C/N], 0[C/N], -1.4e-011[C/N], 0[C/N], -1.4e-011[C/N], 0[C/N], 0[C/N], 0[C/N], 0[C/N], 0[C/N]}
      epsilonrT = diag{9.35, 9.35, 10.3}
      eta_sE = {0, 0, 0, 0, 0, 0, 0, 0, 0, 0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}
      eta_dET = {0, 0, 0, 0, 0, 0, 0, 0, 0, 0, 0, 0, 0, 0, 0, 0, 0, 0}
      eta_epsilonT = 0
    StressCharge "Stress-charge form"
      cE = {9.06835e+010[Pa], 5.8089e+010[Pa], 5.09351e+010[Pa], 0[Pa], 0[Pa], 0[Pa], 5.8089e+010[Pa], 9.06835e+010[Pa], 5.09351e+010[Pa], 0[Pa], 0[Pa], 0[Pa], 5.09351e+010[Pa], 5.09351e+010[Pa], 9.38047e+010[Pa], 0[Pa], 0[Pa], 0[Pa], 0[Pa], 0[Pa], 0[Pa], 1.50399e+010[Pa], 0[Pa], 0[Pa], 0[Pa], 0[Pa], 0[Pa], 0[Pa], 1.50399e+010[Pa], 0[Pa], 0[Pa], 0[Pa], 0[Pa], 0[Pa], 0[Pa], 1.62973e+010[Pa]}
      eES = {0[C/m^2], 0[C/m^2], -0.219231[C/m^2], 0[C/m^2], 0[C/m^2], -0.219231[C/m^2], 0[C/m^2], 0[C/m^2], 0.456838[C/m^2], 0[C/m^2], -0.210558[C/m^2], 0[C/m^2], -0.210558[C/m^2], 0[C/m^2], 0[C/m^2], 0[C/m^2], 0[C/m^2], 0[C/m^2]}
      epsilonrS = diag{9.0171, 9.0171, 9.5210}
      eta_cE = {0, 0, 0, 0, 0, 0, 0, 0, 0, 0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}
      eta_eES = {0, 0, 0, 0, 0, 0, 0, 0, 0, 0, 0, 0, 0, 0, 0, 0, 0, 0}
      eta_epsilonS = 0
  mat11: Common "Lithium Tantalate (modified)" (disabled) on domains 1
    def "Basic"
      relpermittivity = diag{40.9, 40.9, 43.3}
      density = 7460[kg/m^3]
    StrainCharge "Strain-charge form"
      sE = {4.87e-012[1/Pa], -5.8e-013[1/Pa], -1.25e-012[1/Pa], 6.4e-013[1/Pa], 0[1/Pa], 0[1/Pa], -5.8e-013[1/Pa], 4.87e-012[1/Pa], -1.25e-012[1/Pa], -6.4e-013[1/Pa], 0[1/Pa], 0[1/Pa], -1.25e-012[1/Pa], -1.25e-012[1/Pa], 4.36e-012[1/Pa], 0[1/Pa], 0[1/Pa], 0[1/Pa], 6.4e-013[1/Pa], -6.4e-013[1/Pa], 0[1/Pa], 1.08e-011[1/Pa], 0[1/Pa], 0[1/Pa], 0[1/Pa], 0[1/Pa], 0[1/Pa], 0[1/Pa], 1.08e-011[1/Pa], 1.28e-012[1/Pa], 0[1/Pa], 0[1/Pa], 0[1/Pa], 0[1/Pa], 1.28e-012[1/Pa], 1.09e-011[1/Pa]}
      dET = {0[C/N], -7e-012[C/N], -2e-012[C/N], 0[C/N], 7e-012[C/N], -2e-012[C/N], 0[C/N], 0[C/N], 8e-012[C/N], 0[C/N], 2.6e-011[C/N], 0[C/N], 2.6e-011[C/N], 0[C/N], 0[C/N], -1.4e-011[C/N], 0[C/N], 0[C/N]}
      epsilonrT = diag{51, 51, 45}
      eta_sE = {0, 0, 0, 0, 0, 0, 0, 0, 0, 0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}
      eta_dET = {0, 0, 0, 0, 0, 0, 0, 0, 0, 0, 0, 0, 0, 0, 0, 0, 0, 0}
      eta_epsilonT = 0
    StressCharge "Stress-charge form"
      cE = {2.32966e+011[Pa], 4.68904e+010[Pa], 8.02342e+010[Pa], -1.10267e+010[Pa], 0[Pa], 0[Pa], 4.68904e+010[Pa], 2.32966e+011[Pa], 8.02342e+010[Pa], 1.10267e+010[Pa], 0[Pa], 0[Pa], 8.02342e+010[Pa], 8.02342e+010[Pa], 2.75364e+011[Pa], 0[Pa], 0[Pa], 0[Pa], -1.10267e+010[Pa], 1.10267e+010[Pa], 0[Pa], 9.38995e+010[Pa], 0[Pa], 0[Pa], 0[Pa], 0[Pa], 0[Pa], 0[Pa], 9.38995e+010[Pa], -1.10267e+010[Pa], 0[Pa], 0[Pa], 0[Pa], 0[Pa], -1.10267e+010[Pa], 9.3038e+010[Pa]}
      eES = {0[C/m^2], -1.58923[C/m^2], 0.0821598[C/m^2], 0[C/m^2], 1.58923[C/m^2], 0.0821598[C/m^2], 0[C/m^2], 0[C/m^2], 1.88197[C/m^2], 0[C/m^2], 2.59576[C/m^2], 0[C/m^2], 2.59576[C/m^2], 0[C/m^2], 0[C/m^2], -1.58923[C/m^2], 0[C/m^2], 0[C/m^2]}
      epsilonrS = diag{40.9, 40.9, 43.3}
      eta_cE = {0, 0, 0, 0, 0, 0, 0, 0, 0, 0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}
      eta_eES = {0, 0, 0, 0, 0, 0, 0, 0, 0, 0, 0, 0, 0, 0, 0, 0, 0, 0}
      eta_epsilonS = 0
  mat12: Common "Lithium Tantalate" (disabled) on domains 1
    def "Basic"
      relpermittivity = diag{40.9, 40.9, 43.3}
      density = 7450[kg/m^3]
    StrainCharge "Strain-charge form"
      sE = {4.87e-012[1/Pa], -5.8e-013[1/Pa], -1.25e-012[1/Pa], 6.4e-013[1/Pa], 0[1/Pa], 0[1/Pa], -5.8e-013[1/Pa], 4.87e-012[1/Pa], -1.25e-012[1/Pa], -6.4e-013[1/Pa], 0[1/Pa], 0[1/Pa], -1.25e-012[1/Pa], -1.25e-012[1/Pa], 4.36e-012[1/Pa], 0[1/Pa], 0[1/Pa], 0[1/Pa], 6.4e-013[1/Pa], -6.4e-013[1/Pa], 0[1/Pa], 1.08e-011[1/Pa], 0[1/Pa], 0[1/Pa], 0[1/Pa], 0[1/Pa], 0[1/Pa], 0[1/Pa], 1.08e-011[1/Pa], 1.28e-012[1/Pa], 0[1/Pa], 0[1/Pa], 0[1/Pa], 0[1/Pa], 1.28e-012[1/Pa], 1.09e-011[1/Pa]}
      dET = {0[C/N], -7e-012[C/N], -2e-012[C/N], 0[C/N], 7e-012[C/N], -2e-012[C/N], 0[C/N], 0[C/N], 8e-012[C/N], 0[C/N], 2.6e-011[C/N], 0[C/N], 2.6e-011[C/N], 0[C/N], 0[C/N], -1.4e-011[C/N], 0[C/N], 0[C/N]}
      epsilonrT = diag{51, 51, 45}
      eta_sE = {0, 0, 0, 0, 0, 0, 0, 0, 0, 0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}
      eta_dET = {0, 0, 0, 0, 0, 0, 0, 0, 0, 0, 0, 0, 0, 0, 0, 0, 0, 0}
      eta_epsilonT = 0
    StressCharge "Stress-charge form"
      cE = {2.32966e+011[Pa], 4.68904e+010[Pa], 8.02342e+010[Pa], -1.10267e+010[Pa], 0[Pa], 0[Pa], 4.68904e+010[Pa], 2.32966e+011[Pa], 8.02342e+010[Pa], 1.10267e+010[Pa], 0[Pa], 0[Pa], 8.02342e+010[Pa], 8.02342e+010[Pa], 2.75364e+011[Pa], 0[Pa], 0[Pa], 0[Pa], -1.10267e+010[Pa], 1.10267e+010[Pa], 0[Pa], 9.38995e+010[Pa], 0[Pa], 0[Pa], 0[Pa], 0[Pa], 0[Pa], 0[Pa], 9.38995e+010[Pa], -1.10267e+010[Pa], 0[Pa], 0[Pa], 0[Pa], 0[Pa], -1.10267e+010[Pa], 9.3038e+010[Pa]}
      eES = {0[C/m^2], -1.58923[C/m^2], 0.0821598[C/m^2], 0[C/m^2], 1.58923[C/m^2], 0.0821598[C/m^2], 0[C/m^2], 0[C/m^2], 1.88197[C/m^2], 0[C/m^2], 2.59576[C/m^2], 0[C/m^2], 2.59576[C/m^2], 0[C/m^2], 0[C/m^2], -1.58923[C/m^2], 0[C/m^2], 0[C/m^2]}
      epsilonrS = diag{40.9, 40.9, 43.3}
      eta_cE = {0, 0, 0, 0, 0, 0, 0, 0, 0, 0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}
      eta_eES = {0, 0, 0, 0, 0, 0, 0, 0, 0, 0, 0, 0, 0, 0, 0, 0, 0, 0}
      eta_epsilonS = 0

Physics
  w1: WeakFormPDE "Mechanical Field" on domains 1
    dependent variable u = {u, v, w}
    Units.DependentVariableQuantity = none
    wfeq1: WeakFormPDE "力学" (default)
      weak = {-(test(S1)*T1+test(S2)*T2+test(S3)*T3+test(S4)*T4+test(S5)*T5+test(S6)*T6)+rho*(omega)^2*(test(u)*u+test(v)*v+test(w)*w), 0, 0}
    zflx1: ZeroFluxBoundary "Zero Flux 1" (default)
    init1: init "Initial Values 1" (default)
    weak1: WeakContribution "耦合项" on domains 1
      integrationOrder = 4
      quadratureFrame = spatial
      weakExpression = (test(S1)*eE1+test(S2)*eE2+test(S3)*eE3+test(S4)*eE4+test(S5)*eE5+test(S6)*eE6)
      automaticQuadrature = 1
    pc1: PeriodicCondition on boundaries 2, 8 | destinationDomains: boundaries 8
    pc2: PeriodicCondition on boundaries 1, 10 | destinationDomains: boundaries 10
    dir1: DirichletBoundary "Dirichlet Boundary Condition 1" on boundaries 3 | r = {0, 0, 0}
  w2: WeakFormPDE "Internal EM Field" on domains 1
    dependent variable EM1 = {M1x, M1y, M1z}
    Units.DependentVariableQuantity = none
    Units.CustomDependentVariableUnit = V/m / (rad/s)
    Units.CustomSourceTermUnit = m^-2
    wfeq1: WeakFormPDE "Electric Term" (default) | weak = {-(D1x*test(E1x)+D1y*test(E1y)+D1z*test(E1z)), 0, 0}
    zflx1: ZeroFluxBoundary "Zero Flux 1" (default)
    init1: init "Initial Values 1" (default)
    weak1: WeakContribution "Magnetic Term" on domains 1
      integrationOrder = 4
      quadratureFrame = spatial
      weakExpression = (curlM1x*test(curlM1x)+curlM1y*test(curlM1y)+curlM1z*test(curlM1z)) / mu0_const
      automaticQuadrature = 1
    pc1: PeriodicCondition on boundaries 1, 10 | destinationDomains: boundaries 10
    pc2: PeriodicCondition on boundaries 2, 8 | destinationDomains: boundaries 8
    dir1: DirichletBoundary "Fixed Constrain" on boundaries 3 | r = {0, 0, 0}
    constr2: PointwiseConstraint "Continuity-x" on boundaries 6 | constraintExpression = tM1x-tM2x
    constr3: PointwiseConstraint "Continuity-y" on boundaries 6 | constraintExpression = tM1y-tM2y
    constr4: PointwiseConstraint "Continuity-z" on boundaries 6
      constraintType = symmetricConstraint
      constraintExpression = tM1z-tM2z
      constraintMethod = elemental
  w3: WeakFormPDE "External EM Field" on domains 2
    dependent variable EM2 = {M2x, M2y, M2z}
    Units.DependentVariableQuantity = none
    Units.CustomDependentVariableUnit = V/m / (rad/s)
    Units.CustomSourceTermUnit = m^-2
    wfeq1: WeakFormPDE "Electric Term" (default) | weak = {-(D2x*test(E2x)+D2y*test(E2y)+D2z*test(E2z)), 0, 0}
    zflx1: ZeroFluxBoundary "Zero Flux 1" (default)
    init1: init "Initial Values 1" (default)
    weak1: WeakContribution "Magnetic Term" on domains 2
      integrationOrder = 4
      quadratureFrame = spatial
      weakExpression = (curlM2x*test(curlM2x)+curlM2y*test(curlM2y)+curlM2z*test(curlM2z)) / mu0_const
      automaticQuadrature = 1
    pc4: PeriodicCondition on boundaries 4, 11 | destinationDomains: boundaries 11
    pc5: PeriodicCondition on boundaries 5, 9 | destinationDomains: boundaries 9
    dir2: DirichletBoundary "Fixed Constrain" on boundaries 7 | r = {0, 0, 0}
    constr4: PointwiseConstraint "Continuity-x" on boundaries 6 | constraintExpression = tM1x-tM2x
    constr5: PointwiseConstraint "Continuity-y" on boundaries 6 | constraintExpression = tM1y-tM2y
    constr6: PointwiseConstraint "Continuity-z" on boundaries 6 | constraintExpression = tM1z-tM2z
    wc1: WeakConstraint (disabled) on domains 2 | constraintExpression = d(Dx, x)

Mesh
  mesh1 "Mesh 1"
    size: MeshSizeDefault | hmax = 1.7; hmin = 0.12; hauto = 1; custom = on
    swe1: Sweep "Swept 1" (disabled) on entire geometry
    fq1: FreeQuad (disabled) on boundaries 1, 4
    swe2: Sweep "Swept 2" (disabled) on domains 1, 2 | sourceface = boundaries 1, 4; targetface = boundaries 10, 11
      dis1: Distribution on domains 1, 2 | numelem = 7
    fq2: FreeQuad on boundaries 2, 5
    swe3: Sweep "Swept 3" on domains 1, 2 | sourceface = boundaries 2, 5; targetface = boundaries 8, 9
      dis1: Distribution on domains 1, 2 | numelem = 1
    ref1: Refine (disabled) on entire geometry

Studies
  std1 "Study 1"
    eigv: Eigenvalue | eigunit = MHz; shift = 26.954553; neigs = 6

Solver configurations
  sol1 "Solution 1" (study std1)
    v1: Variables "Dependent Variables 1"
    e1: Eigenvalue "Eigenvalue Solver 1"
      dDef: Direct

Datasets
  dset1: Solution | solution = sol1

Derived values
  int3: IntVolume "internal" on domains 1
    data = dset1
    table = tbl5
    expr = {realdot(S1,T1)+realdot(S2,T2)+realdot(S3,T3)+realdot(S4,T4)+realdot(S5,T5)+realdot(S6,T6), rho*omega^2*(realdot(u,u)+realdot(v,v)+realdot(w,w)), realdot(D1xE,E1x)+realdot(D1yE,E1y)+realdot(D1zE,E1z), mu0_const*(realdot(H1x,H1x)+realdot(H1y,H1y)+realdot(H1z,H1z))}
    unit = {J, , , J}
    descr = {E_ela_int, E_kin_int, E_elec_int, E_mag_int}
  int4: IntVolume "external" on domains 2
    data = dset1
    table = tbl4
    expr = {(realdot(D2x,E2x)+realdot(D2y,E2y)+realdot(D2z,E2z)), mu0_const*(realdot(H2x,H2x)+realdot(H2y,H2y)+realdot(H2z,H2z))}
    descr = {E_elec_ext, E_mag_ext}

Tables
  tbl4: Table
    // external
    Eigenvalue (MHz) | E_elec_ext (J) | E_mag_ext (J)
    25.3926-4.16752e-14i | 9.46093e-11 | 0.0111339
    25.3926+4.16752e-14i | 9.46093e-11 | 0.0111339
    26.6838 | 2.60394e-19 | 1.23471e-23
    27.4026 | 6.72225e-08 | 6.01656e-15
    27.4026 | 6.55899e-08 | 5.87016e-15
    28.4825 | 3.22254e-14 | 3.45211e-08
  tbl5: Table
    // internal
    Eigenvalue (MHz) | E_ela_int (J) | E_kin_int (J) | E_elec_int (J) | E_mag_int (J)
    30.5686 | 7.40589e+08 | 7.40589e+08 | 2.49281e-09 | 0.0111766
    30.8237 | 0.0111651 | 0.0112027 | 3.75715e-05 | 1.66799e-12
    31.1409 | 0.00525005 | 0.00528588 | 3.58276e-05 | 4.32945e-13
    31.1409 | 0.00525077 | 0.0052866 | 3.58336e-05 | 4.33001e-13
    34.7701 | 0.00978438 | 0.00983095 | 4.65622e-05 | 1.54946e-12
    34.7701 | 0.00975007 | 0.00979647 | 4.63991e-05 | 1.54403e-12

Plots
  pg1: PlotGroup3D "disp" | data = dset1
    vol1: Volume | expr = sqrt(realdot(u,u)+realdot(v,v)+realdot(w,w))
      def1: Deform "Deformation 1" | expr = {u, v, w}
  pg2: PlotGroup3D "E" | data = dset1
    vol1: Volume | expr = sqrt(realdot(E1x,E1x)+realdot(E1y,E1y)+realdot(E1z,E1z)) / mE
      def1: Deform "Deformation 1" (disabled) | expr = {E1x, E1y, 0}
    vol2: Volume | expr = sqrt(realdot(E2x,E2x)+realdot(E2y,E2y)+realdot(E2z,E2z)) / mE
  pg3: PlotGroup3D "H" | data = dset1
    vol1: Volume | expr = sqrt(realdot(H1x,H1x)+realdot(H1y,H1y)+realdot(H1z,H1z)) / mH
    vol2: Volume | expr = sqrt(realdot(H2x,H2x)+realdot(H2y,H2y)+realdot(H2z,H2z)) / mH
  pg4: PlotGroup3D "Ex" | data = dset1
    vol1: Volume | expr = real(E1x) / mEx
    vol2: Volume | expr = real(E2x) / mEx
  pg5: PlotGroup3D "Ey" | data = dset1
    vol1: Volume | expr = real(E1y) / mEy
    vol2: Volume | expr = real(E2y) / mEy
  pg6: PlotGroup3D "Ez" | data = dset1
    vol1: Volume | expr = real(E1z) / mEz
    vol2: Volume | expr = real(E2z) / mEz
  pg7: PlotGroup3D "Dx" | data = dset1
    vol1: Volume | expr = real(D1x) / mDx
    vol2: Volume | expr = real(D2x) / mDx
  pg8: PlotGroup3D "Dy" | data = dset1
    vol1: Volume | expr = real(D1y) / mDy
    vol2: Volume | expr = real(D2y) / mDy
  pg9: PlotGroup3D "Dz" | data = dset1
    vol1: Volume | expr = real(D1z) / mDz
    vol2: Volume | expr = real(D2z) / mDz
  pg10: PlotGroup3D "Hx" | data = dset1
    vol1: Volume | expr = real(H1x) / mHx
    vol2: Volume | expr = real(H2x) / mHx
  pg11: PlotGroup3D "Hy" | data = dset1
    vol1: Volume | expr = real(H1y) / mHy
    vol2: Volume | expr = real(H2y) / mHy
  pg12: PlotGroup3D "Hz" | data = dset1
    vol1: Volume | expr = real(H1z) / mHz
    vol2: Volume | expr = real(H2z) / mHz